// SBML level 3 version 1

function bounds__max(x, y)
  piecewise(x, x > y, y);
end
bounds__max is "minimum of arguments";

function bounds__min(x, y)
  piecewise(x, x < y, y);
end
bounds__min is "maximum of arguments";

model diauxic_top()
  // Top level model
  // Diauxic Growth Model
  // Description
  // Dynamic Flux Balance Analysis of Diauxic Growth in Escherichia coli
  // The key variables in the mathematical model of the metabolic network are the glucose concentration (Glcxt), the acetate concentration (Ac), the biomass concentration (X), and the oxygen concentration (O2) in the gas phase.
  // This file has been produced by Matthias Koenig.
  // Terms of use
  // Copyright © 2017 Matthias Koenig
  // Redistribution and use of any part of this model, with or without modification, are permitted provided that the following conditions are met:
  // Redistributions of this SBML file must retain the above copyright notice, this list of conditions and the following disclaimer.
  // Redistributions in a different form must reproduce the above copyright notice, this list of conditions and the following disclaimer in the documentation and/or other materials provided with the distribution.
  // This model is distributed in the hope that it will be useful, but WITHOUT ANY WARRANTY; without even the implied warranty of MERCHANTABILITY or FITNESS FOR A PARTICULAR PURPOSE.
  // model units - substance: mmol, time: h, volume: l, area: m2, length: m, extent: mmol

  // Compartments:
  compartment bioreactor = 1 l;

  // Species:
  species Glcxt in bioreactor = 10.8; Glcxt is "glucose";
  species Ac in bioreactor = 0.4; Ac is "acetate";
  species O2 in bioreactor = 0.21; O2 is "oxygen";
  species X in bioreactor = 0.001; X is "biomass";
  species dummy_S in bioreactor = 0;

  // Parameters:
  dt = 0.1 h; dt is "fba timestep";
  EX_Glcxt has mmol_per_hg;
  EX_Ac has mmol_per_hg;
  EX_O2 has mmol_per_hg;
  EX_X has mmol_per_hg;
  lb_EX_Ac has mmol_per_hg;
  ub_EX_Ac has mmol_per_hg;
  lb_EX_Glcxt has mmol_per_hg;
  ub_EX_Glcxt has mmol_per_hg;
  lb_EX_O2 has mmol_per_hg;
  ub_EX_O2 has mmol_per_hg;
  lb_EX_X has mmol_per_hg;
  ub_EX_X has mmol_per_hg;
  bounds__dt = 0.1 bounds__h; bounds__dt is "fba timestep";
  bounds__Vmax_vGlcxt = 10 bounds__mmol_per_hg;
  bounds__Km_vGlcxt = 0.015 bounds__mmol_per_l;
  bounds__ub_vGlcxt has bounds__mmol_per_hg;
  bounds__zero = 0 bounds__mmol_per_hg; bounds__zero is "zero bound";
  bounds__lb_default = -1000 bounds__mmol_per_hg; bounds__lb_default is "default lower bound";
  bounds__ub_default = 1000 bounds__mmol_per_hg; bounds__ub_default is "default upper bound";
  fba__zero = 0 fba__mmol_per_hg; fba__zero is "zero bound";
  fba__lb_default = -1000 fba__mmol_per_hg; fba__lb_default is "default lower bound";
  fba__ub_default = 1000 fba__mmol_per_hg; fba__ub_default is "default upper bound";
  fba__ub_vGlcxt = 10 fba__mmol_per_hg;
  fba__ub_vO2 = 15 fba__mmol_per_hg;
  update__Y has update__g_per_l; update__Y is "biomass [g_per_l]";
  update__Km_vFBA = 0.02 update__mmol_per_l;

  // Assignment rules:
  EX_Glcxt := dummy_EX_Glcxt;
  EX_Ac := dummy_EX_Ac;
  EX_O2 := dummy_EX_O2;
  EX_X := dummy_EX_X;
  bounds__ub_vGlcxt := bounds__Vmax_vGlcxt*Glcxt/(bounds__Km_vGlcxt + Glcxt);
  lb_EX_Ac := bounds__max(bounds__lb_default, -Ac*bioreactor/(bounds__dt*1 bounds__g));
  lb_EX_Glcxt := bounds__max(bounds__lb_default, -Glcxt*bioreactor/(bounds__dt*1 bounds__g));
  lb_EX_O2 := bounds__max(bounds__lb_default, -O2*bioreactor/(bounds__dt*1 bounds__g));
  lb_EX_X := bounds__max(bounds__lb_default, -X*bioreactor/(bounds__dt*1 bounds__g));
  ub_EX_Ac := bounds__min(bounds__ub_default, Ac*bioreactor/(bounds__dt*1 bounds__g));
  ub_EX_Glcxt := bounds__min(bounds__ub_default, Glcxt*bioreactor/(bounds__dt*1 bounds__g));
  ub_EX_O2 := bounds__min(bounds__ub_default, O2*bioreactor/(bounds__dt*1 bounds__g));
  ub_EX_X := bounds__min(bounds__ub_default, X*bioreactor/(bounds__dt*1 bounds__g));
  update__Y := 1 update__g_per_mmol*X;

  // Reactions:
  dummy_EX_O2: O2 => ; ; dummy_EX_O2 is "O2 exchange";
  dummy_EX_Glcxt: Glcxt => ; ; dummy_EX_Glcxt is "Glcxt exchange";
  dummy_EX_Ac: Ac -> ; ; dummy_EX_Ac is "Ac exchange";
  dummy_EX_X: X => ; ; dummy_EX_X is "biomass exchange";
  fba__vO2: => O2; ; fba__vO2 is "O2 import (vO2)";
  fba__vGlcxt: => Glcxt; ; fba__vGlcxt is "Glcxt import (vGlcxt)";
  fba__v1: 39.43 Ac + 35 O2 => X; ; fba__v1 is "v1 (39.43 Ac + 35 O2 -> X)";
  fba__v2: 9.46 Glcxt + 12.92 O2 => X; ; fba__v2 is "v2 (9.46 Glcxt + 12.92 O2 -> X)";
  fba__v3: 9.84 Glcxt + 12.73 O2 => X + 1.24 Ac; ; fba__v3 is "v3 (9.84 Glcxt + 12.73 O2 -> 1.24 Ac + X)";
  fba__v4: 19.23 Glcxt => X + 12.12 Ac; ; fba__v4 is "v4 (19.23 Glcxt -> 12.12 Ac + X)";
  update__update_Glcxt: Glcxt => ; -EX_Glcxt*update__Y*bioreactor*Glcxt/(update__Km_vFBA + Glcxt);
  update__update_Ac: Ac => ; -EX_Ac*update__Y*bioreactor*Ac/(update__Km_vFBA + Ac);
  update__update_O2: O2 => ; -EX_O2*update__Y*bioreactor*O2/(update__Km_vFBA + O2);
  update__update_X: X => ; -EX_X*update__Y*bioreactor;

  // Unit definitions:
  unit h = 3600 second;
  unit g = gram;
  unit m = metre;
  unit m2 = metre^2;
  unit l = litre;
  unit per_h = 1 / (3600 second);
  unit mmol_per_l = 1e-3 mole / litre;
  unit g_per_l = gram / litre;
  unit mmol = 1e-3 mole;
  unit per_g = 1 / gram;
  unit g_per_mmol = gram / (1e-3 mole);
  unit mmol_per_h = 1e-3 mole / (3600 second);
  unit mmol_per_hg = 1e-3 mole / (3600 second * gram);
  unit mmol_per_lh = 1e-3 mole / (litre * 3600 second);
  unit g_per_lh = gram / (litre * 3600 second);
  unit bounds__h = 3600 second;
  unit bounds__g = gram;
  unit bounds__m = metre;
  unit bounds__m2 = metre^2;
  unit bounds__l = litre;
  unit bounds__per_h = 1 / (3600 second);
  unit bounds__mmol_per_l = 1e-3 mole / litre;
  unit bounds__g_per_l = gram / litre;
  unit bounds__mmol = 1e-3 mole;
  unit bounds__per_g = 1 / gram;
  unit bounds__g_per_mmol = gram / (1e-3 mole);
  unit bounds__mmol_per_h = 1e-3 mole / (3600 second);
  unit bounds__mmol_per_hg = 1e-3 mole / (3600 second * gram);
  unit bounds__mmol_per_lh = 1e-3 mole / (litre * 3600 second);
  unit bounds__g_per_lh = gram / (litre * 3600 second);
  unit fba__h = 3600 second;
  unit fba__g = gram;
  unit fba__m = metre;
  unit fba__m2 = metre^2;
  unit fba__l = litre;
  unit fba__per_h = 1 / (3600 second);
  unit fba__mmol_per_l = 1e-3 mole / litre;
  unit fba__g_per_l = gram / litre;
  unit fba__mmol = 1e-3 mole;
  unit fba__per_g = 1 / gram;
  unit fba__g_per_mmol = gram / (1e-3 mole);
  unit fba__mmol_per_h = 1e-3 mole / (3600 second);
  unit fba__mmol_per_hg = 1e-3 mole / (3600 second * gram);
  unit fba__mmol_per_lh = 1e-3 mole / (litre * 3600 second);
  unit fba__g_per_lh = gram / (litre * 3600 second);
  unit update__h = 3600 second;
  unit update__g = gram;
  unit update__m = metre;
  unit update__m2 = metre^2;
  unit update__l = litre;
  unit update__per_h = 1 / (3600 second);
  unit update__mmol_per_l = 1e-3 mole / litre;
  unit update__g_per_l = gram / litre;
  unit update__mmol = 1e-3 mole;
  unit update__per_g = 1 / gram;
  unit update__g_per_mmol = gram / (1e-3 mole);
  unit update__mmol_per_h = 1e-3 mole / (3600 second);
  unit update__mmol_per_hg = 1e-3 mole / (3600 second * gram);
  unit update__mmol_per_lh = 1e-3 mole / (litre * 3600 second);
  unit update__g_per_lh = gram / (litre * 3600 second);
end
