// SBML level 3 version 1

model rbc_update(blood, M_35cgmp_e, M_3moxtyr_e, M_4pyrdx_e, M_5aop_e, ac_e, acald_e, acnam_e, ade_e, adn_e, adrnl_e, ala__L_e, arg__L_e, ascb__L_e, bilglcur_e, ca2_e, camp_e, chol_e, cl_e, co_e, co2_e, cys__L_e, dhdascb_e, dopa_e, etha_e, fe2_e, fru_e, fum_e, gal_e, gam_e, glc__D_e, gln__L_e, gluala_e, gly_e, glyc_e, gthox_e, h_e, h2o_e, h2o2_e, hco3_e, hcys__L_e, hdca_e, hxan_e, ins_e, k_e, lac__D_e, lac__L_e, leuktrA4_e, leuktrB4_e, lnlc_e, mal__L_e, man_e, mepi_e, met__L_e, na1_e, nac_e, ncam_e, nh4_e, normete__L_e, nrpphr_e, o2_e, ocdcea_e, orot_e, phe__L_e, pi_e, ptrc_e, pydam_e, pydx_e, pydxn_e, pyr_e, ribflv_e, spmd_e, sprm_e, thm_e, thmmp_e, urea_e, uri_e, pEX_M_35cgmp_e, pEX_M_3moxtyr_e, pEX_M_4pyrdx_e, pEX_M_5aop_e, pEX_ac_e, pEX_acald_e, pEX_acnam_e, pEX_ade_e, pEX_adn_e, pEX_adrnl_e, pEX_ala__L_e, pEX_arg__L_e, pEX_ascb__L_e, pEX_bilglcur_e, pEX_ca2_e, pEX_camp_e, pEX_chol_e, pEX_cl_e, pEX_co_e, pEX_co2_e, pEX_cys__L_e, pEX_dhdascb_e, pEX_dopa_e, pEX_etha_e, pEX_fe2_e, pEX_fru_e, pEX_fum_e, pEX_gal_e, pEX_gam_e, pEX_glc__D_e, pEX_gln__L_e, pEX_gluala_e, pEX_gly_e, pEX_glyc_e, pEX_gthox_e, pEX_h_e, pEX_h2o_e, pEX_h2o2_e, pEX_hco3_e, pEX_hcys__L_e, pEX_hdca_e, pEX_hxan_e, pEX_ins_e, pEX_k_e, pEX_lac__D_e, pEX_lac__L_e, pEX_leuktrA4_e, pEX_leuktrB4_e, pEX_lnlc_e, pEX_mal__L_e, pEX_man_e, pEX_mepi_e, pEX_met__L_e, pEX_na1_e, pEX_nac_e, pEX_ncam_e, pEX_nh4_e, pEX_normete__L_e, pEX_nrpphr_e, pEX_o2_e, pEX_ocdcea_e, pEX_orot_e, pEX_phe__L_e, pEX_pi_e, pEX_ptrc_e, pEX_pydam_e, pEX_pydx_e, pEX_pydxn_e, pEX_pyr_e, pEX_ribflv_e, pEX_spmd_e, pEX_sprm_e, pEX_thm_e, pEX_thmmp_e, pEX_urea_e, pEX_uri_e)
  // rbc (UPDATE)
  // E.coli core DFBA model
  // Model version: 2
  // UPDATE submodel
  // Submodel for dynamically updating the metabolite count. This updates the ode model based on the FBA fluxes.
  // Description
  // This is a metabolism model of Homo sapiens in SBML format.
  // The content of this model has been carefully created in a manual research effort. This file has been exported from the software COBRApy and further processed with the JSBML-based ModelPolisher application.
  // This file has been produced by the Systems Biology Research Group using BiGG Models knowledge-base version of Nov 21, 2016, where it is currently hosted and identified by: iAB_RBC_283.
  // Terms of use
  // Copyright © 2016 The Regents of the University of California.
  // Redistribution and use of any part of this model from BiGG Models knowledge-base, with or without modification, are permitted provided that the following conditions are met:
  // Redistributions of this SBML file must retain the above copyright notice, this list of conditions and the following disclaimer.
  // Redistributions in a different form must reproduce the above copyright notice, this list of conditions and the following disclaimer in the documentation and/or other materials provided with the distribution.
  // This model is distributed in the hope that it will be useful, but WITHOUT ANY WARRANTY; without even the implied warranty of MERCHANTABILITY or FITNESS FOR A PARTICULAR PURPOSE.
  // For specific licensing terms about this particular model and regulations of commercial use, see this model in BiGG Models knowledge-base.
  // References
  // When using content from BiGG Models knowledge-base in your research works, please cite
  // King ZA, Lu JS, Dräger A, Miller PC, Federowicz S, Lerman JA, Ebrahim A, Palsson BO, and Lewis NE. (2015).
  // BiGG Models: A platform for integrating, standardizing, and sharing genome-scale models. Nucl Acids Res. doi:10.1093/nar/gkv1049
  // model units - substance: mmol, time: h, volume: l, area: m2, length: m, extent: mmol

  // Compartments:
  compartment blood = 1 l;

  // Species:
  species M_35cgmp_e in blood = 1; M_35cgmp_e is "3',5'-Cyclic GMP";
  species M_3moxtyr_e in blood = 1; M_3moxtyr_e is "3moxtyr c";
  species M_4pyrdx_e in blood = 1; M_4pyrdx_e is "4pyrdx c";
  species M_5aop_e in blood = 1; M_5aop_e is "5-Amino-4-oxopentanoate";
  species ac_e in blood = 1; ac_e is "Acetate";
  species acald_e in blood = 1; acald_e is "Acetaldehyde";
  species acnam_e in blood = 1; acnam_e is "N-Acetylneuraminate";
  species ade_e in blood = 1; ade_e is "Adenine";
  species adn_e in blood = 1; adn_e is "Adenosine";
  species adrnl_e in blood = 1; adrnl_e is "Adrnl c";
  species ala__L_e in blood = 1; ala__L_e is "L-Alanine";
  species arg__L_e in blood = 1; arg__L_e is "L-Arginine";
  species ascb__L_e in blood = 1; ascb__L_e is "L-Ascorbate";
  species bilglcur_e in blood = 1; bilglcur_e is "Bilglcur c";
  species ca2_e in blood = 1; ca2_e is "Calcium";
  species camp_e in blood = 1; camp_e is "CAMP";
  species chol_e in blood = 1; chol_e is "Choline";
  species cl_e in blood = 1; cl_e is "Chloride";
  species co_e in blood = 1; co_e is "Carbon monoxide";
  species co2_e in blood = 1; co2_e is "CO2";
  species cys__L_e in blood = 1; cys__L_e is "L-Cysteine";
  species dhdascb_e in blood = 1; dhdascb_e is "Dhdascb c";
  species dopa_e in blood = 1; dopa_e is "Dopamine";
  species etha_e in blood = 1; etha_e is "Ethanolamine";
  species fe2_e in blood = 1; fe2_e is "Fe2+";
  species fru_e in blood = 1; fru_e is "D-Fructose";
  species fum_e in blood = 1; fum_e is "Fumarate";
  species gal_e in blood = 1; gal_e is "D-Galactose";
  species gam_e in blood = 1; gam_e is "D-Glucosamine";
  species glc__D_e in blood = 1; glc__D_e is "D-Glucose";
  species gln__L_e in blood = 1; gln__L_e is "L-Glutamine";
  species gluala_e in blood = 1; gluala_e is "5 L Glutamyl L alanine C8H13N2O5";
  species gly_e in blood = 1; gly_e is "Glycine";
  species glyc_e in blood = 1; glyc_e is "Glycerol";
  species gthox_e in blood = 1; gthox_e is "Oxidized glutathione";
  species h_e in blood = 1; h_e is "H+";
  species h2o_e in blood = 1; h2o_e is "H2O";
  species h2o2_e in blood = 1; h2o2_e is "Hydrogen peroxide";
  species hco3_e in blood = 1; hco3_e is "Bicarbonate";
  species hcys__L_e in blood = 1; hcys__L_e is "L-Homocysteine";
  species hdca_e in blood = 1; hdca_e is "Hexadecanoate (n-C16:0)";
  species hxan_e in blood = 1; hxan_e is "Hypoxanthine";
  species ins_e in blood = 1; ins_e is "Inosine";
  species k_e in blood = 1; k_e is "Potassium";
  species lac__D_e in blood = 1; lac__D_e is "D-Lactate";
  species lac__L_e in blood = 1; lac__L_e is "L-Lactate";
  species leuktrA4_e in blood = 1; leuktrA4_e is "LeuktrA4 c";
  species leuktrB4_e in blood = 1; leuktrB4_e is "LeuktrB4 c";
  species lnlc_e in blood = 1; lnlc_e is "Lnlc c";
  species mal__L_e in blood = 1; mal__L_e is "L-Malate";
  species man_e in blood = 1; man_e is "D-Mannose";
  species mepi_e in blood = 1; mepi_e is "Mepi c";
  species met__L_e in blood = 1; met__L_e is "L-Methionine";
  species na1_e in blood = 1; na1_e is "Sodium";
  species nac_e in blood = 1; nac_e is "Nicotinate";
  species ncam_e in blood = 1; ncam_e is "Nicotinamide";
  species nh4_e in blood = 1; nh4_e is "Ammonium";
  species normete__L_e in blood = 1; normete__L_e is "Normete L c";
  species nrpphr_e in blood = 1; nrpphr_e is "Nrpphr c";
  species o2_e in blood = 1; o2_e is "O2";
  species ocdcea_e in blood = 1; ocdcea_e is "Octadecenoate (n-C18:1)";
  species orot_e in blood = 1; orot_e is "Orotate";
  species phe__L_e in blood = 1; phe__L_e is "L-Phenylalanine";
  species pi_e in blood = 1; pi_e is "Phosphate";
  species ptrc_e in blood = 1; ptrc_e is "Putrescine";
  species pydam_e in blood = 1; pydam_e is "Pyridoxamine";
  species pydx_e in blood = 1; pydx_e is "Pyridoxal";
  species pydxn_e in blood = 1; pydxn_e is "Pyridoxine";
  species pyr_e in blood = 1; pyr_e is "Pyruvate";
  species ribflv_e in blood = 1; ribflv_e is "Riboflavin";
  species spmd_e in blood = 1; spmd_e is "Spermidine";
  species sprm_e in blood = 1; sprm_e is "Spermine C10H30N4";
  species thm_e in blood = 1; thm_e is "Thiamin";
  species thmmp_e in blood = 1; thmmp_e is "Thiamin monophosphate";
  species urea_e in blood = 1; urea_e is "Urea";
  species uri_e in blood = 1; uri_e is "Uridine";

  // Parameters:
  pEX_M_35cgmp_e = 1 mmol_per_h;
  pEX_M_3moxtyr_e = 1 mmol_per_h;
  pEX_M_4pyrdx_e = 1 mmol_per_h;
  pEX_M_5aop_e = 1 mmol_per_h;
  pEX_ac_e = 1 mmol_per_h;
  pEX_acald_e = 1 mmol_per_h;
  pEX_acnam_e = 1 mmol_per_h;
  pEX_ade_e = 1 mmol_per_h;
  pEX_adn_e = 1 mmol_per_h;
  pEX_adrnl_e = 1 mmol_per_h;
  pEX_ala__L_e = 1 mmol_per_h;
  pEX_arg__L_e = 1 mmol_per_h;
  pEX_ascb__L_e = 1 mmol_per_h;
  pEX_bilglcur_e = 1 mmol_per_h;
  pEX_ca2_e = 1 mmol_per_h;
  pEX_camp_e = 1 mmol_per_h;
  pEX_chol_e = 1 mmol_per_h;
  pEX_cl_e = 1 mmol_per_h;
  pEX_co_e = 1 mmol_per_h;
  pEX_co2_e = 1 mmol_per_h;
  pEX_cys__L_e = 1 mmol_per_h;
  pEX_dhdascb_e = 1 mmol_per_h;
  pEX_dopa_e = 1 mmol_per_h;
  pEX_etha_e = 1 mmol_per_h;
  pEX_fe2_e = 1 mmol_per_h;
  pEX_fru_e = 1 mmol_per_h;
  pEX_fum_e = 1 mmol_per_h;
  pEX_gal_e = 1 mmol_per_h;
  pEX_gam_e = 1 mmol_per_h;
  pEX_glc__D_e = 1 mmol_per_h;
  pEX_gln__L_e = 1 mmol_per_h;
  pEX_gluala_e = 1 mmol_per_h;
  pEX_gly_e = 1 mmol_per_h;
  pEX_glyc_e = 1 mmol_per_h;
  pEX_gthox_e = 1 mmol_per_h;
  pEX_h_e = 1 mmol_per_h;
  pEX_h2o_e = 1 mmol_per_h;
  pEX_h2o2_e = 1 mmol_per_h;
  pEX_hco3_e = 1 mmol_per_h;
  pEX_hcys__L_e = 1 mmol_per_h;
  pEX_hdca_e = 1 mmol_per_h;
  pEX_hxan_e = 1 mmol_per_h;
  pEX_ins_e = 1 mmol_per_h;
  pEX_k_e = 1 mmol_per_h;
  pEX_lac__D_e = 1 mmol_per_h;
  pEX_lac__L_e = 1 mmol_per_h;
  pEX_leuktrA4_e = 1 mmol_per_h;
  pEX_leuktrB4_e = 1 mmol_per_h;
  pEX_lnlc_e = 1 mmol_per_h;
  pEX_mal__L_e = 1 mmol_per_h;
  pEX_man_e = 1 mmol_per_h;
  pEX_mepi_e = 1 mmol_per_h;
  pEX_met__L_e = 1 mmol_per_h;
  pEX_na1_e = 1 mmol_per_h;
  pEX_nac_e = 1 mmol_per_h;
  pEX_ncam_e = 1 mmol_per_h;
  pEX_nh4_e = 1 mmol_per_h;
  pEX_normete__L_e = 1 mmol_per_h;
  pEX_nrpphr_e = 1 mmol_per_h;
  pEX_o2_e = 1 mmol_per_h;
  pEX_ocdcea_e = 1 mmol_per_h;
  pEX_orot_e = 1 mmol_per_h;
  pEX_phe__L_e = 1 mmol_per_h;
  pEX_pi_e = 1 mmol_per_h;
  pEX_ptrc_e = 1 mmol_per_h;
  pEX_pydam_e = 1 mmol_per_h;
  pEX_pydx_e = 1 mmol_per_h;
  pEX_pydxn_e = 1 mmol_per_h;
  pEX_pyr_e = 1 mmol_per_h;
  pEX_ribflv_e = 1 mmol_per_h;
  pEX_spmd_e = 1 mmol_per_h;
  pEX_sprm_e = 1 mmol_per_h;
  pEX_thm_e = 1 mmol_per_h;
  pEX_thmmp_e = 1 mmol_per_h;
  pEX_urea_e = 1 mmol_per_h;
  pEX_uri_e = 1 mmol_per_h;

  // Reactions:
  update_M_35cgmp_e: M_35cgmp_e -> ; -pEX_M_35cgmp_e;
  update_M_3moxtyr_e: M_3moxtyr_e -> ; -pEX_M_3moxtyr_e;
  update_M_4pyrdx_e: M_4pyrdx_e -> ; -pEX_M_4pyrdx_e;
  update_M_5aop_e: M_5aop_e -> ; -pEX_M_5aop_e;
  update_ac_e: ac_e -> ; -pEX_ac_e;
  update_acald_e: acald_e -> ; -pEX_acald_e;
  update_acnam_e: acnam_e -> ; -pEX_acnam_e;
  update_ade_e: ade_e -> ; -pEX_ade_e;
  update_adn_e: adn_e -> ; -pEX_adn_e;
  update_adrnl_e: adrnl_e -> ; -pEX_adrnl_e;
  update_ala__L_e: ala__L_e -> ; -pEX_ala__L_e;
  update_arg__L_e: arg__L_e -> ; -pEX_arg__L_e;
  update_ascb__L_e: ascb__L_e -> ; -pEX_ascb__L_e;
  update_bilglcur_e: bilglcur_e -> ; -pEX_bilglcur_e;
  update_ca2_e: ca2_e -> ; -pEX_ca2_e;
  update_camp_e: camp_e -> ; -pEX_camp_e;
  update_chol_e: chol_e -> ; -pEX_chol_e;
  update_cl_e: cl_e -> ; -pEX_cl_e;
  update_co_e: co_e -> ; -pEX_co_e;
  update_co2_e: co2_e -> ; -pEX_co2_e;
  update_cys__L_e: cys__L_e -> ; -pEX_cys__L_e;
  update_dhdascb_e: dhdascb_e -> ; -pEX_dhdascb_e;
  update_dopa_e: dopa_e -> ; -pEX_dopa_e;
  update_etha_e: etha_e -> ; -pEX_etha_e;
  update_fe2_e: fe2_e -> ; -pEX_fe2_e;
  update_fru_e: fru_e -> ; -pEX_fru_e;
  update_fum_e: fum_e -> ; -pEX_fum_e;
  update_gal_e: gal_e -> ; -pEX_gal_e;
  update_gam_e: gam_e -> ; -pEX_gam_e;
  update_glc__D_e: glc__D_e -> ; -pEX_glc__D_e;
  update_gln__L_e: gln__L_e -> ; -pEX_gln__L_e;
  update_gluala_e: gluala_e -> ; -pEX_gluala_e;
  update_gly_e: gly_e -> ; -pEX_gly_e;
  update_glyc_e: glyc_e -> ; -pEX_glyc_e;
  update_gthox_e: gthox_e -> ; -pEX_gthox_e;
  update_h_e: h_e -> ; -pEX_h_e;
  update_h2o_e: h2o_e -> ; -pEX_h2o_e;
  update_h2o2_e: h2o2_e -> ; -pEX_h2o2_e;
  update_hco3_e: hco3_e -> ; -pEX_hco3_e;
  update_hcys__L_e: hcys__L_e -> ; -pEX_hcys__L_e;
  update_hdca_e: hdca_e -> ; -pEX_hdca_e;
  update_hxan_e: hxan_e -> ; -pEX_hxan_e;
  update_ins_e: ins_e -> ; -pEX_ins_e;
  update_k_e: k_e -> ; -pEX_k_e;
  update_lac__D_e: lac__D_e -> ; -pEX_lac__D_e;
  update_lac__L_e: lac__L_e -> ; -pEX_lac__L_e;
  update_leuktrA4_e: leuktrA4_e -> ; -pEX_leuktrA4_e;
  update_leuktrB4_e: leuktrB4_e -> ; -pEX_leuktrB4_e;
  update_lnlc_e: lnlc_e -> ; -pEX_lnlc_e;
  update_mal__L_e: mal__L_e -> ; -pEX_mal__L_e;
  update_man_e: man_e -> ; -pEX_man_e;
  update_mepi_e: mepi_e -> ; -pEX_mepi_e;
  update_met__L_e: met__L_e -> ; -pEX_met__L_e;
  update_na1_e: na1_e -> ; -pEX_na1_e;
  update_nac_e: nac_e -> ; -pEX_nac_e;
  update_ncam_e: ncam_e -> ; -pEX_ncam_e;
  update_nh4_e: nh4_e -> ; -pEX_nh4_e;
  update_normete__L_e: normete__L_e -> ; -pEX_normete__L_e;
  update_nrpphr_e: nrpphr_e -> ; -pEX_nrpphr_e;
  update_o2_e: o2_e -> ; -pEX_o2_e;
  update_ocdcea_e: ocdcea_e -> ; -pEX_ocdcea_e;
  update_orot_e: orot_e -> ; -pEX_orot_e;
  update_phe__L_e: phe__L_e -> ; -pEX_phe__L_e;
  update_pi_e: pi_e -> ; -pEX_pi_e;
  update_ptrc_e: ptrc_e -> ; -pEX_ptrc_e;
  update_pydam_e: pydam_e -> ; -pEX_pydam_e;
  update_pydx_e: pydx_e -> ; -pEX_pydx_e;
  update_pydxn_e: pydxn_e -> ; -pEX_pydxn_e;
  update_pyr_e: pyr_e -> ; -pEX_pyr_e;
  update_ribflv_e: ribflv_e -> ; -pEX_ribflv_e;
  update_spmd_e: spmd_e -> ; -pEX_spmd_e;
  update_sprm_e: sprm_e -> ; -pEX_sprm_e;
  update_thm_e: thm_e -> ; -pEX_thm_e;
  update_thmmp_e: thmmp_e -> ; -pEX_thmmp_e;
  update_urea_e: urea_e -> ; -pEX_urea_e;
  update_uri_e: uri_e -> ; -pEX_uri_e;

  // Unit definitions:
  unit h = 3600 second;
  unit g = gram;
  unit m = metre;
  unit m2 = metre^2;
  unit l = litre;
  unit mmol = 1e-3 mole;
  unit per_h = 1 / (3600 second);
  unit mmol_per_h = 1e-3 mole / (3600 second);
  unit mmol_per_l = 1e-3 mole / litre;
  unit l_per_mmol = litre / (1e-3 mole);
  unit g_per_l = gram / litre;
  unit g_per_mmol = gram / (1e-3 mole);
end
