// SBML level 3 version 1

model substance_units1()
  // Example model for substance units
  // Applying species conversion factors to have distinct subsets of species in the model
  // .
  // The content of this model has been carefully created in a manual research effort.
  // This file has been created by Matthias Koenig.
  // Terms of use
  // Copyright © 2021 Matthias Koenig.
  // Redistribution and use of any part of this model, with or without modification, are permitted provided that the following conditions are met:
  // Redistributions of this SBML file must retain the above copyright notice, this list of conditions and the following disclaimer.
  // Redistributions in a different form must reproduce the above copyright notice, this list of conditions and the following disclaimer in the documentation and/or other materials provided with the distribution.
  // This model is distributed in the hope that it will be useful, but WITHOUT ANY WARRANTY; without even the implied warranty of MERCHANTABILITY or FITNESS FOR A PARTICULAR PURPOSE.
  // model units - substance: mmole, time: min, volume: litre, area: m2, length: m, extent: mmole

  // Compartments:
  compartment cyto = 1 litre; cyto is "cytosol";

  // Species:
  species glc in cyto = 3; glc is "D-glucose";
  species glc6p in cyto = 0.5; glc6p is "D-glucose 6-phosphate";
  substanceOnly species hex1 in cyto = 1*cyto; hex1 is "hexokinase protein";  // substance in dimensionless; conversionFactor cf_units_per_mmole

  // Parameters:
  cf_units_per_mmole = 1 per_mmole;
  HEX1SYNTHESIS_k = 1 mmole_per_min;
  HEX1_Vmax = 1 mmole_per_min;
  HEX1_Km_glc = 0.1 mM;

  // Reactions:
  HEX1SYNTHESIS: => hex1; HEX1SYNTHESIS_k; HEX1SYNTHESIS is "hexokinase synthesis";
  HEX1: glc => glc6p; HEX1_Vmax*hex1*glc/(HEX1_Km_glc + glc); HEX1 is "hexokinase";  // modifiers: hex1

  // Unit definitions:
  unit kg = kilogram;
  unit min = 60 second;
  unit m = metre;
  unit m2 = metre^2;
  unit m3 = metre^3;
  unit mM = 1e-3 mole / litre;
  unit mmole = 1e-3 mole;
  unit per_mmole = 1 / (1e-3 mole);
  unit mmole_per_min = 1e-3 mole / (60 second);
  unit per_min = 1 / (60 second);
end
