// SBML level 3 version 1
// Created with https://github.com/matthiaskoenig/sbmlutils.

model assignment_example()
  // model with assignments
  // Example model demonstrating InitialAssignment and AssignmentRule.
  // InitalAssignments allow to set values at the initial timepoint of simulation. AssignmentRules are evaluated at every time point.
  // Terms of use
  // The content of this model has been carefully created in a manual research effort. This file has been created by Matthias König using sbmlutils. For questions contact koenigmx@hu-berlin.de. Copyright © 2022 Matthias König.
  // This work is licensed under a Creative Commons Attribution 4.0 International License.
  // Redistribution and use of any part of this model, with or without modification, are permitted provided that the following conditions are met:
  // Redistributions of this SBML file must retain the above copyright notice, this list of conditions and the following disclaimer.
  // Redistributions in a different form must reproduce the above copyright notice, this list of conditions and the following disclaimer in the documentation and/or other materials provided with the distribution.
  // This model is distributed in the hope that it will be useful, but WITHOUT ANY WARRANTY; without even the implied warranty of MERCHANTABILITY or FITNESS FOR A PARTICULAR PURPOSE.
  // model units - substance: mg, time: hr, volume: litre, area: m2, length: metre, extent: mg

  // Parameters:
  // The parameter does not have an initial value set. An InitialAssignment is used to set the parameter.
  D = PODOSE + IVDOSE; D has mg; D is "total dose";
  A = 0 mg; A is "amount in blood";
  IVDOSE = 0 mg; IVDOSE is "intravenous dose";
  PODOSE = 100 mg; PODOSE is "oral dose";
  k1 = 0.1 l_per_hr; k1 is "rate constant for dose";
  BW = 70 kg; BW is "body weight";
  FVblood = 0.05 l_per_kg; FVblood is "fractional volume of the blood";
  Vblood = BW*FVblood; Vblood has litre; Vblood is "blood volume";
  Cve has mg_per_l; Cve is "rule to caluclate concentration";

  // Assignment rules:
  // Assignment rule to calculate the concentration Cve in [mg/l] from the species A and the volume Vblood.
  Cve := A/Vblood;

  // Rate rules:
  D' = -k1*Cve;

  // Unit definitions:
  unit hr = 3600 second;
  unit kg = 1000 gram;
  unit l_per_hr = litre / (3600 second); l_per_hr is "liter/hr";
  unit l_per_kg = litre / (1000 gram); l_per_kg is "liter/kg";
  unit m2 = metre^2; m2 is "meter^2";
  unit mg = 1e-3 gram;
  unit mg_per_hr = 1e-3 gram / (3600 second); mg_per_hr is "mg/hr";
  unit mg_per_l = 1e-3 gram / litre; mg_per_l is "mg/liter";
end
