// SBML level 3 version 1
// Created with https://github.com/matthiaskoenig/sbmlutils.

model linear_chain()
  // Linear chain
  // Example model for the programmatic creation of a linear chain.
  // Terms of use
  // The content of this model has been carefully created in a manual research effort. This file has been created by Matthias König using sbmlutils. For questions contact koenigmx@hu-berlin.de. Copyright © 2024 Matthias König.
  // This work is licensed under a Creative Commons Attribution 4.0 International License.
  // Redistribution and use of any part of this model, with or without modification, are permitted provided that the following conditions are met:
  // Redistributions of this SBML file must retain the above copyright notice, this list of conditions and the following disclaimer.
  // Redistributions in a different form must reproduce the above copyright notice, this list of conditions and the following disclaimer in the documentation and/or other materials provided with the distribution.
  // This model is distributed in the hope that it will be useful, but WITHOUT ANY WARRANTY; without even the implied warranty of MERCHANTABILITY or FITNESS FOR A PARTICULAR PURPOSE.

  // Compartments:
  compartment cell = 1;

  // Species:
  species S1 in cell = 10;
  species Species_2 in cell = 0;
  species Species_3 in cell = 0;
  species Species_4 in cell = 0;

  // Parameters:
  k1 = 0.1; k1 is "rate constant 1";
  k2 = 0.1; k2 is "rate constant 2";
  k3 = 0.1; k3 is "rate constant 3";

  // Reactions:
  J1: S1 => Species_2; k1*S1;
  J2: Species_2 => Species_3; k2*Species_2;
  J3: Species_3 => Species_4; k3*Species_3;
end
