// SBML level 3 version 1
// Created with https://github.com/matthiaskoenig/sbmlutils.

model minimal_model_comp()
  // Hierarchical model reusing the minimal model in composite model coupling.

  // Compartments:
  compartment cell0 = 1;
  compartment cell1 = 1;
  compartment cell2 = 1;
  compartment cell3 = 1;
  compartment cell4 = 1;

  // Species:
  species S0 in cell0 = 10;
  species S1 in cell1 = 0;
  species S2 in cell2 = 0;
  species S3 in cell3 = 0;
  species S4 in cell4 = 0;
  species submodel0__S2 in cell0 = 0;
  species submodel1__S2 in cell1 = 0;
  species submodel2__S2 in cell2 = 0;
  species submodel3__S2 in cell3 = 0;
  species submodel4__S2 in cell4 = 0;

  // Parameters:
  D = 0.01;
  submodel0__k1 = 0.1; submodel0__k1 is "rate constant for J0";  // SBO:0000002
  submodel1__k1 = 0.1; submodel1__k1 is "rate constant for J0";  // SBO:0000002
  submodel2__k1 = 0.1; submodel2__k1 is "rate constant for J0";  // SBO:0000002
  submodel3__k1 = 0.1; submodel3__k1 is "rate constant for J0";  // SBO:0000002
  submodel4__k1 = 0.1; submodel4__k1 is "rate constant for J0";  // SBO:0000002

  // Reactions:
  J0: S0 -> S1; D*(S0 - S1);
  J1: S1 -> S2; D*(S1 - S2);
  J2: S2 -> S3; D*(S2 - S3);
  J3: S3 -> S4; D*(S3 - S4);
  submodel0__J0: S0 => submodel0__S2; submodel0__k1*S0;
  submodel1__J0: S1 => submodel1__S2; submodel1__k1*S1;
  submodel2__J0: S2 => submodel2__S2; submodel2__k1*S2;
  submodel3__J0: S3 => submodel3__S2; submodel3__k1*S3;
  submodel4__J0: S4 => submodel4__S2; submodel4__k1*S4;
end
