// SBML level 3 version 1

model dex_kidney(Vext, Vki, Vurine, dex_ext, dor_ext, dex_urine, dor_urine)
  // model units - substance: mmole, time: min, volume: litre, area: m2, length: m, extent: mmole

  // Compartments:
  compartment Vext = 4 litre; Vext is "blood";
  compartment Vki = 1.5 litre; Vki is "kidney";
  compartment Vurine = 1 litre;

  // Species:
  species dex_ext in Vext = 0; dex_ext is "dextormethorphan (extern)";
  species dor_ext in Vext = 0; dor_ext is "dextrorphan (extern)";
  substanceOnly species dex_urine in Vurine = 0; dex_urine is "dextormethorphan (urine)";
  substanceOnly species dor_urine in Vurine = 0; dor_urine is "dextrorphan (urine)";

  // Parameters:
  DEXEX_k = 0.01683035 per_min; DEXEX_k is "dex urinary excretion (kidney)";
  DOREX_k = 0.1369474 per_min; DOREX_k is "dor urinary excretion (kidney)";

  // Reactions:
  DEXEX: dex_ext => dex_urine; DEXEX_k*Vki*dex_ext;
  DOREX: dor_ext => dor_urine; DOREX_k*Vki*dor_ext;

  // Unit definitions:
  unit mmole = 1e-3 mole;
  unit min = 60 second;
  unit m = metre;
  unit m2 = metre^2;
  unit mM = 1e-3 mole / litre;
  unit mmole_per_min = 1e-3 mole / (60 second);
  unit mmole_per_min_l = 1e-3 mole / (60 second * litre);
  unit litre_per_min = litre / (60 second);
  unit per_min = 1 / (60 second);
  unit mg = 1e-3 gram;
  unit g_per_mole = gram / mole;
end
