// SBML level 3 version 1

model dex_liver(DEXCYP3A4_Vmax, DEXCYP3A4_Km_dex, Vext, Vli, dex_ext, dor_ext)
  // dex_liver
  // Description
  // Dextormethorphan (DEX) liver model. DEX can be taken up by the liver and be converted to DOR via CYP2D6. This reaction can be inhibitited by substances such as quinidine.Within the liver part of the DEX can be metabolized via CYP3A4 mediated first-pass metabolism (the metabolic product of the reaction MEM is not part of the model), resulting in a reduced bioavailability of DEX.
  // The content of this model has been carefully created in a manual research effort.
  // This file has been created by Matthias Koenig.
  // Terms of use
  // Copyright © 2021 Matthias Koenig.
  // Redistribution and use of any part of this model, with or without modification, are permitted provided that the following conditions are met:
  // Redistributions of this SBML file must retain the above copyright notice, this list of conditions and the following disclaimer.
  // Redistributions in a different form must reproduce the above copyright notice, this list of conditions and the following disclaimer in the documentation and/or other materials provided with the distribution.
  // This model is distributed in the hope that it will be useful, but WITHOUT ANY WARRANTY; without even the implied warranty of MERCHANTABILITY or FITNESS FOR A PARTICULAR PURPOSE.
  // model units - substance: mmole, time: min, volume: litre, area: m2, length: m, extent: mmole

  // Compartments:
  compartment Vext = 4 litre; Vext is "plasma";  // FMA:62850 ncit:C13356 BTO:0000131
  compartment Vli = 1.5 litre; Vli is "liver";  // FMA:7197 BTO:0000759 ncit:C12392

  // Species:
  species dex_ext in Vext = 0; dex_ext is "dextormethorphan (plasma)";  // CHEBI:4470 ncit:C62022 inchikey:MKXZASYAUGDDCJ-NJAFHUGGSA-N
  species dor_ext in Vext = 0; dor_ext is "dextrorphan (plasma)";  // CHEBI:29133 ncit:C171857 inchikey:JAQUASYNZVUNQP-PVAVHDDUSA-N
  species $qui_ext in Vext = 0; qui_ext is "quinidine";  // CHEBI:28593 ncit:C793 inchikey:LOUPRKONTZGTKE-LHHVKLHASA-N
  species dex in Vli = 0; dex is "dextormethorphan (liver)";  // CHEBI:4470 ncit:C62022 inchikey:MKXZASYAUGDDCJ-NJAFHUGGSA-N
  species dor in Vli = 0; dor is "dextrorphan (liver)";  // CHEBI:29133 ncit:C171857 inchikey:JAQUASYNZVUNQP-PVAVHDDUSA-N

  // Parameters:
  cyp2d6_a0 = 1 dimensionless; cyp2d6_a0 is "*1 activity";
  cyp2d6_a1 = 0.25 dimensionless; cyp2d6_a1 is "*10 activity";
  cyp2d6_a2 = 0 dimensionless; cyp2d6_a2 is "*100 activity";
  cyp2d6_a3 = 0 dimensionless; cyp2d6_a3 is "*101 activity";
  cyp2d6_a4 = 0.5 dimensionless; cyp2d6_a4 is "*10x2 activity";
  cyp2d6_a5 = 0 dimensionless; cyp2d6_a5 is "*11 activity";
  cyp2d6_a6 = 0 dimensionless; cyp2d6_a6 is "*114 activity";
  cyp2d6_a7 = 0 dimensionless; cyp2d6_a7 is "*12 activity";
  cyp2d6_a8 = 0 dimensionless; cyp2d6_a8 is "*120 activity";
  cyp2d6_a9 = 0 dimensionless; cyp2d6_a9 is "*124 activity";
  cyp2d6_a10 = 0 dimensionless; cyp2d6_a10 is "*129 activity";
  cyp2d6_a11 = 0 dimensionless; cyp2d6_a11 is "*13 activity";
  cyp2d6_a12 = 0.5 dimensionless; cyp2d6_a12 is "*14 activity";
  cyp2d6_a13 = 0 dimensionless; cyp2d6_a13 is "*15 activity";
  cyp2d6_a14 = 0.5 dimensionless; cyp2d6_a14 is "*17 activity";
  cyp2d6_a15 = 1 dimensionless; cyp2d6_a15 is "*17x2 activity";
  cyp2d6_a16 = 0 dimensionless; cyp2d6_a16 is "*18 activity";
  cyp2d6_a17 = 0 dimensionless; cyp2d6_a17 is "*19 activity";
  cyp2d6_a18 = 2 dimensionless; cyp2d6_a18 is "*1x2 activity";
  cyp2d6_a19 = 3 dimensionless; cyp2d6_a19 is "*1x3 activity";
  cyp2d6_a20 = 4 dimensionless; cyp2d6_a20 is "*1x4 activity";
  cyp2d6_a21 = 5 dimensionless; cyp2d6_a21 is "*1x5 activity";
  cyp2d6_a22 = 6 dimensionless; cyp2d6_a22 is "*1x6 activity";
  cyp2d6_a23 = 1 dimensionless; cyp2d6_a23 is "*2 activity";
  cyp2d6_a24 = 0 dimensionless; cyp2d6_a24 is "*20 activity";
  cyp2d6_a25 = 0 dimensionless; cyp2d6_a25 is "*21 activity";
  cyp2d6_a26 = 1 dimensionless; cyp2d6_a26 is "*27 activity";
  cyp2d6_a27 = 0.5 dimensionless; cyp2d6_a27 is "*29 activity";
  cyp2d6_a28 = 1 dimensionless; cyp2d6_a28 is "*29x2 activity";
  cyp2d6_a29 = 2 dimensionless; cyp2d6_a29 is "*2x2 activity";
  cyp2d6_a30 = 3 dimensionless; cyp2d6_a30 is "*2x3 activity";
  cyp2d6_a31 = 4 dimensionless; cyp2d6_a31 is "*2x4 activity";
  cyp2d6_a32 = 5 dimensionless; cyp2d6_a32 is "*2x5 activity";
  cyp2d6_a33 = 6 dimensionless; cyp2d6_a33 is "*2x6 activity";
  cyp2d6_a34 = 0 dimensionless; cyp2d6_a34 is "*3 activity";
  cyp2d6_a35 = 0 dimensionless; cyp2d6_a35 is "*31 activity";
  cyp2d6_a36 = 1 dimensionless; cyp2d6_a36 is "*33 activity";
  cyp2d6_a37 = 1 dimensionless; cyp2d6_a37 is "*34 activity";
  cyp2d6_a38 = 1 dimensionless; cyp2d6_a38 is "*35 activity";
  cyp2d6_a39 = 2 dimensionless; cyp2d6_a39 is "*35x2 activity";
  cyp2d6_a40 = 0 dimensionless; cyp2d6_a40 is "*36 activity";
  cyp2d6_a41 = 0 dimensionless; cyp2d6_a41 is "*36x2 activity";
  cyp2d6_a42 = 0 dimensionless; cyp2d6_a42 is "*38 activity";
  cyp2d6_a43 = 1 dimensionless; cyp2d6_a43 is "*39 activity";
  cyp2d6_a44 = 0 dimensionless; cyp2d6_a44 is "*3x2 activity";
  cyp2d6_a45 = 0 dimensionless; cyp2d6_a45 is "*4 activity";
  cyp2d6_a46 = 0 dimensionless; cyp2d6_a46 is "*40 activity";
  cyp2d6_a47 = 0.5 dimensionless; cyp2d6_a47 is "*41 activity";
  cyp2d6_a48 = 1 dimensionless; cyp2d6_a48 is "*41x2 activity";
  cyp2d6_a49 = 1.5 dimensionless; cyp2d6_a49 is "*41x3 activity";
  cyp2d6_a50 = 0 dimensionless; cyp2d6_a50 is "*42 activity";
  cyp2d6_a51 = 0 dimensionless; cyp2d6_a51 is "*44 activity";
  cyp2d6_a52 = 1 dimensionless; cyp2d6_a52 is "*45 activity";
  cyp2d6_a53 = 2 dimensionless; cyp2d6_a53 is "*45x2 activity";
  cyp2d6_a54 = 1 dimensionless; cyp2d6_a54 is "*46 activity";
  cyp2d6_a55 = 0 dimensionless; cyp2d6_a55 is "*47 activity";
  cyp2d6_a56 = 1 dimensionless; cyp2d6_a56 is "*48 activity";
  cyp2d6_a57 = 0.5 dimensionless; cyp2d6_a57 is "*49 activity";
  cyp2d6_a58 = 0 dimensionless; cyp2d6_a58 is "*4x2 activity";
  cyp2d6_a59 = 0 dimensionless; cyp2d6_a59 is "*4x3 activity";
  cyp2d6_a60 = 0 dimensionless; cyp2d6_a60 is "*4x4 activity";
  cyp2d6_a61 = 0 dimensionless; cyp2d6_a61 is "*4x5 activity";
  cyp2d6_a62 = 0 dimensionless; cyp2d6_a62 is "*5 activity";
  cyp2d6_a63 = 0.5 dimensionless; cyp2d6_a63 is "*50 activity";
  cyp2d6_a64 = 0 dimensionless; cyp2d6_a64 is "*51 activity";
  cyp2d6_a65 = 1 dimensionless; cyp2d6_a65 is "*53 activity";
  cyp2d6_a66 = 0.5 dimensionless; cyp2d6_a66 is "*54 activity";
  cyp2d6_a67 = 0.5 dimensionless; cyp2d6_a67 is "*55 activity";
  cyp2d6_a68 = 0 dimensionless; cyp2d6_a68 is "*56 activity";
  cyp2d6_a69 = 0 dimensionless; cyp2d6_a69 is "*57 activity";
  cyp2d6_a70 = 0.5 dimensionless; cyp2d6_a70 is "*59 activity";
  cyp2d6_a71 = 0 dimensionless; cyp2d6_a71 is "*6 activity";
  cyp2d6_a72 = 0 dimensionless; cyp2d6_a72 is "*60 activity";
  cyp2d6_a73 = 0 dimensionless; cyp2d6_a73 is "*62 activity";
  cyp2d6_a74 = 0 dimensionless; cyp2d6_a74 is "*68 activity";
  cyp2d6_a75 = 0 dimensionless; cyp2d6_a75 is "*69 activity";
  cyp2d6_a76 = 0 dimensionless; cyp2d6_a76 is "*6x2 activity";
  cyp2d6_a77 = 0 dimensionless; cyp2d6_a77 is "*7 activity";
  cyp2d6_a78 = 0 dimensionless; cyp2d6_a78 is "*8 activity";
  cyp2d6_a79 = 0 dimensionless; cyp2d6_a79 is "*81 activity";
  cyp2d6_a80 = 0.5 dimensionless; cyp2d6_a80 is "*9 activity";
  cyp2d6_a81 = 0 dimensionless; cyp2d6_a81 is "*92 activity";
  cyp2d6_a82 = 0 dimensionless; cyp2d6_a82 is "*96 activity";
  cyp2d6_a83 = 0 dimensionless; cyp2d6_a83 is "*99 activity";
  cyp2d6_a84 = 1 dimensionless; cyp2d6_a84 is "*9x2 activity";
  cyp2d6_ac = 1 dimensionless; cyp2d6_ac is "custom allele activity";
  cyp2d6_allele_1 = 0 dimensionless;
  cyp2d6_allele_2 = 0 dimensionless;
  cyp2d6_activity_1 has dimensionless; cyp2d6_activity_1 is "activity of allele 1";
  cyp2d6_activity_2 has dimensionless; cyp2d6_activity_2 is "Activity of allele 2";
  DEXCYP3A4_Vmax = 1 mmole_per_min_l; DEXCYP3A4_Vmax is "DEX CYP3A4 Vmax";
  DEXCYP3A4_Km_dex = 286 mM; DEXCYP3A4_Km_dex is "DEX CYP3A4 Km";
  cyp2d6_activity has dimensionless;
  DEXCYP2D6_Vmax = 1 mmole_per_min_l; DEXCYP2D6_Vmax is "DEX CYP2D6 Vmax";
  DEXCYP2D6_Km_dex = 0.00389 mM; DEXCYP2D6_Km_dex is "DEX CYP2D6 Km";
  DEXCYP2D6_Ki_qui = 0.0001 mM; DEXCYP2D6_Ki_qui is "DEX CYP2D6 Ki quinidine";
  DEXCYP3A4_activity = 1 dimensionless;
  DEXIM_f = 100 dimensionless; DEXIM_f is "scaling factor of DEX import";
  DEXIM_Km_dex = 0.1 mM;
  DOREX_f = 100 dimensionless; DOREX_f is "scaling factor of DOR export";
  DOREX_Km_dor = 0.1 mM;

  // Assignment rules:
  cyp2d6_activity_1 := piecewise(cyp2d6_ac, cyp2d6_allele_1 == 0, cyp2d6_a0, cyp2d6_allele_1 == 0, cyp2d6_a1, cyp2d6_allele_1 == 1, cyp2d6_a2, cyp2d6_allele_1 == 2, cyp2d6_a3, cyp2d6_allele_1 == 3, cyp2d6_a4, cyp2d6_allele_1 == 4, cyp2d6_a5, cyp2d6_allele_1 == 5, cyp2d6_a6, cyp2d6_allele_1 == 6, cyp2d6_a7, cyp2d6_allele_1 == 7, cyp2d6_a8, cyp2d6_allele_1 == 8, cyp2d6_a9, cyp2d6_allele_1 == 9, cyp2d6_a10, cyp2d6_allele_1 == 10, cyp2d6_a11, cyp2d6_allele_1 == 11, cyp2d6_a12, cyp2d6_allele_1 == 12, cyp2d6_a13, cyp2d6_allele_1 == 13, cyp2d6_a14, cyp2d6_allele_1 == 14, cyp2d6_a15, cyp2d6_allele_1 == 15, cyp2d6_a16, cyp2d6_allele_1 == 16, cyp2d6_a17, cyp2d6_allele_1 == 17, cyp2d6_a18, cyp2d6_allele_1 == 18, cyp2d6_a19, cyp2d6_allele_1 == 19, cyp2d6_a20, cyp2d6_allele_1 == 20, cyp2d6_a21, cyp2d6_allele_1 == 21, cyp2d6_a22, cyp2d6_allele_1 == 22, cyp2d6_a23, cyp2d6_allele_1 == 23, cyp2d6_a24, cyp2d6_allele_1 == 24, cyp2d6_a25, cyp2d6_allele_1 == 25, cyp2d6_a26, cyp2d6_allele_1 == 26, cyp2d6_a27, cyp2d6_allele_1 == 27, cyp2d6_a28, cyp2d6_allele_1 == 28, cyp2d6_a29, cyp2d6_allele_1 == 29, cyp2d6_a30, cyp2d6_allele_1 == 30, cyp2d6_a31, cyp2d6_allele_1 == 31, cyp2d6_a32, cyp2d6_allele_1 == 32, cyp2d6_a33, cyp2d6_allele_1 == 33, cyp2d6_a34, cyp2d6_allele_1 == 34, cyp2d6_a35, cyp2d6_allele_1 == 35, cyp2d6_a36, cyp2d6_allele_1 == 36, cyp2d6_a37, cyp2d6_allele_1 == 37, cyp2d6_a38, cyp2d6_allele_1 == 38, cyp2d6_a39, cyp2d6_allele_1 == 39, cyp2d6_a40, cyp2d6_allele_1 == 40, cyp2d6_a41, cyp2d6_allele_1 == 41, cyp2d6_a42, cyp2d6_allele_1 == 42, cyp2d6_a43, cyp2d6_allele_1 == 43, cyp2d6_a44, cyp2d6_allele_1 == 44, cyp2d6_a45, cyp2d6_allele_1 == 45, cyp2d6_a46, cyp2d6_allele_1 == 46, cyp2d6_a47, cyp2d6_allele_1 == 47, cyp2d6_a48, cyp2d6_allele_1 == 48, cyp2d6_a49, cyp2d6_allele_1 == 49, cyp2d6_a50, cyp2d6_allele_1 == 50, cyp2d6_a51, cyp2d6_allele_1 == 51, cyp2d6_a52, cyp2d6_allele_1 == 52, cyp2d6_a53, cyp2d6_allele_1 == 53, cyp2d6_a54, cyp2d6_allele_1 == 54, cyp2d6_a55, cyp2d6_allele_1 == 55, cyp2d6_a56, cyp2d6_allele_1 == 56, cyp2d6_a57, cyp2d6_allele_1 == 57, cyp2d6_a58, cyp2d6_allele_1 == 58, cyp2d6_a59, cyp2d6_allele_1 == 59, cyp2d6_a60, cyp2d6_allele_1 == 60, cyp2d6_a61, cyp2d6_allele_1 == 61, cyp2d6_a62, cyp2d6_allele_1 == 62, cyp2d6_a63, cyp2d6_allele_1 == 63, cyp2d6_a64, cyp2d6_allele_1 == 64, cyp2d6_a65, cyp2d6_allele_1 == 65, cyp2d6_a66, cyp2d6_allele_1 == 66, cyp2d6_a67, cyp2d6_allele_1 == 67, cyp2d6_a68, cyp2d6_allele_1 == 68, cyp2d6_a69, cyp2d6_allele_1 == 69, cyp2d6_a70, cyp2d6_allele_1 == 70, cyp2d6_a71, cyp2d6_allele_1 == 71, cyp2d6_a72, cyp2d6_allele_1 == 72, cyp2d6_a73, cyp2d6_allele_1 == 73, cyp2d6_a74, cyp2d6_allele_1 == 74, cyp2d6_a75, cyp2d6_allele_1 == 75, cyp2d6_a76, cyp2d6_allele_1 == 76, cyp2d6_a77, cyp2d6_allele_1 == 77, cyp2d6_a78, cyp2d6_allele_1 == 78, cyp2d6_a79, cyp2d6_allele_1 == 79, cyp2d6_a80, cyp2d6_allele_1 == 80, cyp2d6_a81, cyp2d6_allele_1 == 81, cyp2d6_a82, cyp2d6_allele_1 == 82, cyp2d6_a83, cyp2d6_allele_1 == 83, cyp2d6_a84, cyp2d6_allele_1 == 84, cyp2d6_ac);
  cyp2d6_activity_2 := piecewise(cyp2d6_ac, cyp2d6_allele_2 == 0, cyp2d6_a0, cyp2d6_allele_2 == 0, cyp2d6_a1, cyp2d6_allele_2 == 1, cyp2d6_a2, cyp2d6_allele_2 == 2, cyp2d6_a3, cyp2d6_allele_2 == 3, cyp2d6_a4, cyp2d6_allele_2 == 4, cyp2d6_a5, cyp2d6_allele_2 == 5, cyp2d6_a6, cyp2d6_allele_2 == 6, cyp2d6_a7, cyp2d6_allele_2 == 7, cyp2d6_a8, cyp2d6_allele_2 == 8, cyp2d6_a9, cyp2d6_allele_2 == 9, cyp2d6_a10, cyp2d6_allele_2 == 10, cyp2d6_a11, cyp2d6_allele_2 == 11, cyp2d6_a12, cyp2d6_allele_2 == 12, cyp2d6_a13, cyp2d6_allele_2 == 13, cyp2d6_a14, cyp2d6_allele_2 == 14, cyp2d6_a15, cyp2d6_allele_2 == 15, cyp2d6_a16, cyp2d6_allele_2 == 16, cyp2d6_a17, cyp2d6_allele_2 == 17, cyp2d6_a18, cyp2d6_allele_2 == 18, cyp2d6_a19, cyp2d6_allele_2 == 19, cyp2d6_a20, cyp2d6_allele_2 == 20, cyp2d6_a21, cyp2d6_allele_2 == 21, cyp2d6_a22, cyp2d6_allele_2 == 22, cyp2d6_a23, cyp2d6_allele_2 == 23, cyp2d6_a24, cyp2d6_allele_2 == 24, cyp2d6_a25, cyp2d6_allele_2 == 25, cyp2d6_a26, cyp2d6_allele_2 == 26, cyp2d6_a27, cyp2d6_allele_2 == 27, cyp2d6_a28, cyp2d6_allele_2 == 28, cyp2d6_a29, cyp2d6_allele_2 == 29, cyp2d6_a30, cyp2d6_allele_2 == 30, cyp2d6_a31, cyp2d6_allele_2 == 31, cyp2d6_a32, cyp2d6_allele_2 == 32, cyp2d6_a33, cyp2d6_allele_2 == 33, cyp2d6_a34, cyp2d6_allele_2 == 34, cyp2d6_a35, cyp2d6_allele_2 == 35, cyp2d6_a36, cyp2d6_allele_2 == 36, cyp2d6_a37, cyp2d6_allele_2 == 37, cyp2d6_a38, cyp2d6_allele_2 == 38, cyp2d6_a39, cyp2d6_allele_2 == 39, cyp2d6_a40, cyp2d6_allele_2 == 40, cyp2d6_a41, cyp2d6_allele_2 == 41, cyp2d6_a42, cyp2d6_allele_2 == 42, cyp2d6_a43, cyp2d6_allele_2 == 43, cyp2d6_a44, cyp2d6_allele_2 == 44, cyp2d6_a45, cyp2d6_allele_2 == 45, cyp2d6_a46, cyp2d6_allele_2 == 46, cyp2d6_a47, cyp2d6_allele_2 == 47, cyp2d6_a48, cyp2d6_allele_2 == 48, cyp2d6_a49, cyp2d6_allele_2 == 49, cyp2d6_a50, cyp2d6_allele_2 == 50, cyp2d6_a51, cyp2d6_allele_2 == 51, cyp2d6_a52, cyp2d6_allele_2 == 52, cyp2d6_a53, cyp2d6_allele_2 == 53, cyp2d6_a54, cyp2d6_allele_2 == 54, cyp2d6_a55, cyp2d6_allele_2 == 55, cyp2d6_a56, cyp2d6_allele_2 == 56, cyp2d6_a57, cyp2d6_allele_2 == 57, cyp2d6_a58, cyp2d6_allele_2 == 58, cyp2d6_a59, cyp2d6_allele_2 == 59, cyp2d6_a60, cyp2d6_allele_2 == 60, cyp2d6_a61, cyp2d6_allele_2 == 61, cyp2d6_a62, cyp2d6_allele_2 == 62, cyp2d6_a63, cyp2d6_allele_2 == 63, cyp2d6_a64, cyp2d6_allele_2 == 64, cyp2d6_a65, cyp2d6_allele_2 == 65, cyp2d6_a66, cyp2d6_allele_2 == 66, cyp2d6_a67, cyp2d6_allele_2 == 67, cyp2d6_a68, cyp2d6_allele_2 == 68, cyp2d6_a69, cyp2d6_allele_2 == 69, cyp2d6_a70, cyp2d6_allele_2 == 70, cyp2d6_a71, cyp2d6_allele_2 == 71, cyp2d6_a72, cyp2d6_allele_2 == 72, cyp2d6_a73, cyp2d6_allele_2 == 73, cyp2d6_a74, cyp2d6_allele_2 == 74, cyp2d6_a75, cyp2d6_allele_2 == 75, cyp2d6_a76, cyp2d6_allele_2 == 76, cyp2d6_a77, cyp2d6_allele_2 == 77, cyp2d6_a78, cyp2d6_allele_2 == 78, cyp2d6_a79, cyp2d6_allele_2 == 79, cyp2d6_a80, cyp2d6_allele_2 == 80, cyp2d6_a81, cyp2d6_allele_2 == 81, cyp2d6_a82, cyp2d6_allele_2 == 82, cyp2d6_a83, cyp2d6_allele_2 == 83, cyp2d6_a84, cyp2d6_allele_2 == 84, cyp2d6_ac);
  cyp2d6_activity := cyp2d6_activity_1 + cyp2d6_activity_2;

  // Reactions:
  DEXCYP2D6: dex => dor; DEXCYP2D6_Vmax*Vli*cyp2d6_activity/(1 + qui_ext/DEXCYP2D6_Ki_qui)*dex/(DEXCYP2D6_Km_dex + dex); DEXCYP2D6 is "DEX CYP2D6";  // modifiers: qui_ext
  // CYP3A4 mediated conversion of DEX is responsible for the first-pass metabolism of DEX to MEM/MM3.
  DEXCYP3A4: dex => ; DEXCYP3A4_Vmax*DEXCYP3A4_activity*Vli*dex/(DEXCYP3A4_Km_dex + dex); DEXCYP3A4 is "DEX CYP3A4";
  DEXIM: dex_ext => dex; DEXCYP2D6_Vmax*DEXIM_f*Vli*dex_ext/(DEXIM_Km_dex + dex_ext); DEXIM is "DEX import";
  DOREX: dor => dor_ext; DEXCYP2D6_Vmax*DOREX_f*Vli*dor/(DOREX_Km_dor + dor);

  // Unit definitions:
  unit mmole = 1e-3 mole;
  unit min = 60 second;
  unit m = metre;
  unit m2 = metre^2;
  unit mM = 1e-3 mole / litre;
  unit mmole_per_min = 1e-3 mole / (60 second);
  unit mmole_per_min_l = 1e-3 mole / (60 second * litre);
  unit litre_per_min = litre / (60 second);
  unit per_min = 1 / (60 second);
  unit mg = 1e-3 gram;
  unit g_per_mole = gram / mole;
end
