// SBML level 3 version 1

model icg_body()
  // model units - substance: mmole, time: min, volume: litre, area: m2, length: m, extent: mmole

  // Compartments:
  compartment Vbi; Vbi has litre; Vbi is "bile";
  compartment Vre; Vre has litre; Vre is "rest of body";
  compartment Vgi; Vgi has litre; Vgi is "gastrointestinal tract";
  compartment Vli; Vli has litre; Vli is "liver";
  compartment Vlu; Vlu has litre; Vlu is "lung";
  compartment Vve; Vve has litre; Vve is "venous plasma";
  compartment Var; Var has litre; Var is "arterial plasma";
  compartment Vpo; Vpo has litre; Vpo is "portal plasma";
  compartment Vhv; Vhv has litre; Vhv is "hepatic venous plasma";
  compartment Vfeces = 1 litre;
  compartment Vgi_tissue; Vgi_tissue has litre;
  compartment Vgi_plasma; Vgi_plasma has litre;
  compartment Vli_tissue; Vli_tissue has litre;
  compartment Vli_plasma; Vli_plasma has litre;
  compartment Vlu_tissue; Vlu_tissue has litre;
  compartment Vlu_plasma; Vlu_plasma has litre;
  compartment Vre_tissue; Vre_tissue has litre;
  compartment Vre_plasma; Vre_plasma has litre;

  // Species:
  species Cgi_plasma_icg in Vgi_plasma = 0; Cgi_plasma_icg is "icg (gastrointestinal tract)";
  species Cli_plasma_icg in Vli_plasma = 0; Cli_plasma_icg is "icg (liver)";
  species Clu_plasma_icg in Vlu_plasma = 0; Clu_plasma_icg is "icg (lung)";
  species Cre_plasma_icg in Vre_plasma = 0; Cre_plasma_icg is "icg (rest)";
  species Car_icg in Var = 0; Car_icg is "icg (arterial plasma)";
  species Cve_icg in Vve = 0; Cve_icg is "icg (venous plasma)";
  species Cpo_icg in Vpo = 0; Cpo_icg is "icg (portal vein)";
  species Chv_icg in Vhv = 0; Chv_icg is "icg (hepatic vein)";
  substanceOnly species Afeces_icg in Vfeces = 0; Afeces_icg is "icg (feces)";
  species $LI__bil_ext in Vli_plasma = 0.01; LI__bil_ext is "bilirubin (extern)";
  species LI__icg in Vli_tissue = 0; LI__icg is "icg (liver)";
  species LI__icg_bi in Vbi = 0; LI__icg_bi is "icg (bile)";

  // Parameters:
  conversion_ml_per_l = 1000 ml_per_l; conversion_ml_per_l is "volume conversion factor";
  conversion_l_per_ml = 0.001 l_per_ml; conversion_l_per_ml is "volume conversion factor";
  BW = 75 kg; BW is "body weight [kg]";
  HEIGHT = 170 cm; HEIGHT is "height [cm]";
  BSA has m2; BSA is "body surface area [m^2]";
  COBW = 0.8333333 ml_per_s_kg; COBW is "cardiac output per bodyweight [ml/s/kg]";
  CO has ml_per_s; CO is "cardiac output [ml/s]";
  QC has l_per_min; QC is "cardiac output [L/min]";
  Fblood = 0.02 dimensionless; Fblood is "blood fraction of organ volume";
  HCT = 0.51 dimensionless; HCT is "hematocrit";
  FVgi = 0.0171 l_per_kg; FVgi is "gastrointestinal tract fractional tissue volume";
  FVbi = 0.00071 l_per_kg; FVbi is "bile fractional tissue volume";
  FVli = 0.021 l_per_kg; FVli is "liver fractional tissue volume";
  FVlu = 0.0076 l_per_kg; FVlu is "lung fractional tissue volume";
  FVve = 0.0587 l_per_kg; FVve is "venous fractional tissue volume";
  FVar = 0.0184 l_per_kg; FVar is "arterial fractional tissue volume";
  FVpo = 0.001 l_per_kg; FVpo is "portal fractional tissue volume";
  FVhv = 0.001 l_per_kg; FVhv is "hepatic venous fractional tissue volume";
  FVre has l_per_kg; FVre is "rest of body fractional tissue volume";
  FQgi = 0.19 dimensionless; FQgi is "gastrointestinal tract fractional tissue blood flow";
  FQh = 0.255 dimensionless; FQh is "hepatic (venous side) fractional tissue blood flow";
  FQlu = 1 dimensionless; FQlu is "lung fractional tissue blood flow";
  FQre has dimensionless; FQre is "rest of body fractional tissue blood flow";
  f_cirrhosis = 0 dimensionless; f_cirrhosis is "severity of cirrhosis [0, 0.95]";
  f_shunts = 0 dimensionless; f_shunts is "fraction of portal venous blood shunted by the liver";
  f_tissue_loss = 0 dimensionless; f_tissue_loss is "fraction of lost parenchymal liver volume";
  f_bloodflow = 1 dimensionless; f_bloodflow is "fractional change of hepatic blood flow";
  f_cardiac_output = 1 dimensionless; f_cardiac_output is "fractional change of cardiac output";
  Mr_icg = 774.96493 g_per_mole; Mr_icg is "Molecular weight icg [g/mole]";
  fup_icg = 1 dimensionless; fup_icg is "fraction unbound in plasma icg";
  IVDOSE_icg = 0 mg; IVDOSE_icg is "IV bolus dose icg [mg]";
  ti_icg = 5 s; ti_icg is "injection time icg [s]";
  Ki_icg has per_min; Ki_icg is "Ki [1/min] injection icg";
  Ri_icg = 0 mg_per_min; Ri_icg is "Ri [mg/min] rate of infusion icg";
  cum_dose_icg = 0 mg; cum_dose_icg is "Cumulative dose due to infusion icg";
  Qlu has l_per_min; Qlu is "lung blood flow";
  Qre has l_per_min; Qre is "rest of body blood flow";
  Qh has l_per_min; Qh is "hepatic (venous side) blood flow";
  Qgi has l_per_min; Qgi is "gut blood flow";
  Qpo has l_per_min; Qpo is "portal blood flow";
  Qha has l_per_min; Qha is "hepatic artery blood flow";
  Agi_plasma_icg has mmole; Agi_plasma_icg is "icg concentration (gastrointestinal tract)";
  Cgi_free_icg has mM; Cgi_free_icg is "icg free concentration (gastrointestinal tract)";
  Xgi_plasma_icg has mg; Xgi_plasma_icg is "icg amount (gastrointestinal tract)";
  Mgi_plasma_icg has mg_per_l; Mgi_plasma_icg is "icg amount (gastrointestinal tract)";
  Ali_plasma_icg has mmole; Ali_plasma_icg is "icg concentration (liver)";
  Cli_free_icg has mM; Cli_free_icg is "icg free concentration (liver)";
  Xli_plasma_icg has mg; Xli_plasma_icg is "icg amount (liver)";
  Mli_plasma_icg has mg_per_l; Mli_plasma_icg is "icg amount (liver)";
  Alu_plasma_icg has mmole; Alu_plasma_icg is "icg concentration (lung)";
  Clu_free_icg has mM; Clu_free_icg is "icg free concentration (lung)";
  Xlu_plasma_icg has mg; Xlu_plasma_icg is "icg amount (lung)";
  Mlu_plasma_icg has mg_per_l; Mlu_plasma_icg is "icg amount (lung)";
  Are_plasma_icg has mmole; Are_plasma_icg is "icg concentration (rest)";
  Cre_free_icg has mM; Cre_free_icg is "icg free concentration (rest)";
  Xre_plasma_icg has mg; Xre_plasma_icg is "icg amount (rest)";
  Mre_plasma_icg has mg_per_l; Mre_plasma_icg is "icg amount (rest)";
  Aar_icg has mmole; Aar_icg is "icg concentration (arterial plasma)";
  Car_free_icg has mM; Car_free_icg is "icg free concentration (arterial plasma)";
  Xar_icg has mg; Xar_icg is "{sname} amount ({cname})";
  Mar_icg has mg_per_l; Mar_icg is "icg amount (arterial plasma)";
  Ave_icg has mmole; Ave_icg is "icg concentration (venous plasma)";
  Cve_free_icg has mM; Cve_free_icg is "icg free concentration (venous plasma)";
  Xve_icg has mg; Xve_icg is "{sname} amount ({cname})";
  Mve_icg has mg_per_l; Mve_icg is "icg amount (venous plasma)";
  Apo_icg has mmole; Apo_icg is "icg concentration (portal vein)";
  Cpo_free_icg has mM; Cpo_free_icg is "icg free concentration (portal vein)";
  Xpo_icg has mg; Xpo_icg is "{sname} amount ({cname})";
  Mpo_icg has mg_per_l; Mpo_icg is "icg amount (portal vein)";
  Ahv_icg has mmole; Ahv_icg is "icg concentration (hepatic vein)";
  Chv_free_icg has mM; Chv_free_icg is "icg free concentration (hepatic vein)";
  Xhv_icg has mg; Xhv_icg is "{sname} amount ({cname})";
  Mhv_icg has mg_per_l; Mhv_icg is "icg amount (hepatic vein)";
  ER_icg has dimensionless; ER_icg is "Extraction ratio ICG";
  CLinfusion_icg has litre_per_min; CLinfusion_icg is "infusion clearance (steady state)";
  LI__ICGIM_Vmax = 0.02249479 mmole_per_min_l;
  LI__ICGIM_Km = 0.01392785 mM;
  LI__ICGIM_ki_bil = 0.02 mM;
  LI__ICGLI2CA_Vmax = 0.0009575157 mmole_per_min_l;
  LI__ICGLI2CA_Km = 0.01184841 mM;
  LI__ICGLI2BI_Vmax = 0.0001144655 LI__per_min;

  // Assignment rules:
  FVre := 1 l_per_kg - (FVbi + FVgi + FVli + FVlu + FVve + FVar + FVpo + FVhv);
  FQre := 1 - Qh/Qlu;
  BSA := 0.024265 m2*(BW/(1 kg))^0.5378*(HEIGHT/(1 cm))^0.3964;
  CO := BW*COBW*f_cardiac_output;
  QC := CO/(1000 ml_per_l)*60 s_per_min;
  Vbi := BW*FVbi;
  Vgi := BW*FVgi;
  Vli := BW*FVli;
  Vlu := BW*FVlu;
  Vre := BW*FVre;
  Vve := (1 - HCT)*(BW*FVve - FVve/(FVar + FVve + FVpo + FVhv)*BW*Fblood*(1 l_per_kg - (FVar + FVve + FVpo + FVhv)));
  Var := (1 - HCT)*(BW*FVar - FVar/(FVar + FVve + FVpo + FVhv)*BW*Fblood*(1 l_per_kg - (FVar + FVve + FVpo + FVhv)));
  Vpo := (1 - HCT)*(BW*FVpo - FVpo/(FVar + FVve + FVpo + FVhv)*BW*Fblood*(1 l_per_kg - (FVar + FVve + FVpo + FVhv)));
  Vhv := (1 - HCT)*(BW*FVhv - FVhv/(FVar + FVve + FVpo + FVhv)*BW*Fblood*(1 l_per_kg - (FVar + FVve + FVpo + FVhv)));
  Qlu := QC*FQlu;
  Qre := QC*FQre;
  Qh := QC*FQh*f_bloodflow;
  Qgi := QC*FQgi*f_bloodflow;
  Qpo := Qgi;
  Qha := Qh - Qpo;
  Vgi_plasma := Vgi*Fblood*(1 - HCT);
  Vgi_tissue := Vgi*(1 - Fblood);
  Vli_plasma := Vli*Fblood*(1 - HCT);
  Vli_tissue := Vli*(1 - f_tissue_loss)*(1 - Fblood);
  Vlu_plasma := Vlu*Fblood*(1 - HCT);
  Vlu_tissue := Vlu*(1 - Fblood);
  Vre_plasma := Vre*Fblood*(1 - HCT);
  Vre_tissue := Vre*(1 - Fblood);
  Ki_icg := 0.693/ti_icg*60 s_per_min;
  Agi_plasma_icg := Cgi_plasma_icg*Vgi_plasma;
  Cgi_free_icg := Cgi_plasma_icg*fup_icg;
  Xgi_plasma_icg := Agi_plasma_icg*Mr_icg;
  Mgi_plasma_icg := Agi_plasma_icg/Vgi_plasma*Mr_icg;
  Ali_plasma_icg := Cli_plasma_icg*Vli_plasma;
  Cli_free_icg := Cli_plasma_icg*fup_icg;
  Xli_plasma_icg := Ali_plasma_icg*Mr_icg;
  Mli_plasma_icg := Ali_plasma_icg/Vli_plasma*Mr_icg;
  Alu_plasma_icg := Clu_plasma_icg*Vlu_plasma;
  Clu_free_icg := Clu_plasma_icg*fup_icg;
  Xlu_plasma_icg := Alu_plasma_icg*Mr_icg;
  Mlu_plasma_icg := Alu_plasma_icg/Vlu_plasma*Mr_icg;
  Are_plasma_icg := Cre_plasma_icg*Vre_plasma;
  Cre_free_icg := Cre_plasma_icg*fup_icg;
  Xre_plasma_icg := Are_plasma_icg*Mr_icg;
  Mre_plasma_icg := Are_plasma_icg/Vre_plasma*Mr_icg;
  Aar_icg := Car_icg*Var;
  Car_free_icg := Car_icg*fup_icg;
  Xar_icg := Aar_icg*Mr_icg;
  Mar_icg := Aar_icg/Var*Mr_icg;
  Ave_icg := Cve_icg*Vve;
  Cve_free_icg := Cve_icg*fup_icg;
  Xve_icg := Ave_icg*Mr_icg;
  Mve_icg := Ave_icg/Vve*Mr_icg;
  Apo_icg := Cpo_icg*Vpo;
  Cpo_free_icg := Cpo_icg*fup_icg;
  Xpo_icg := Apo_icg*Mr_icg;
  Mpo_icg := Apo_icg/Vpo*Mr_icg;
  Ahv_icg := Chv_icg*Vhv;
  Chv_free_icg := Chv_icg*fup_icg;
  Xhv_icg := Ahv_icg*Mr_icg;
  Mhv_icg := Ahv_icg/Vhv*Mr_icg;
  ER_icg := (Car_icg + 1e-7 mM - (Chv_icg + 1e-7 mM))/(Car_icg + 1e-7 mM);
  CLinfusion_icg := Ri_icg/Mr_icg/(Cve_icg + 1e-12 mM);

  // Rate rules:
  IVDOSE_icg' = -iv_icg*Mr_icg + Ri_icg;
  cum_dose_icg' = Ri_icg;

  // Reactions:
  iv_icg: => Cve_icg; Ki_icg*IVDOSE_icg/Mr_icg;
  Flow_ar_argi_icg: Car_icg => Cgi_plasma_icg; Qgi*Car_icg; Flow_ar_argi_icg is "inflow gastrointestinal tract icg";
  Flow_gi_po_icg: Cgi_plasma_icg => Cpo_icg; Qgi*Cgi_plasma_icg; Flow_gi_po_icg is "outflow gastrointestinal tract icg";
  Flow_arli_li_icg: Car_icg => Cli_plasma_icg; (1 - f_shunts)*Qha*Car_icg; Flow_arli_li_icg is "arterial inflow liver icg";
  Flow_arli_hv_icg: Car_icg => Chv_icg; f_shunts*Qha*Car_icg; Flow_arli_hv_icg is "flow arterial shunts";
  Flow_po_li_icg: Cpo_icg => Cli_plasma_icg; (1 - f_shunts)*Qpo*Cpo_icg; Flow_po_li_icg is "outflow po icg";
  Flow_po_hv_icg: Cpo_icg => Chv_icg; f_shunts*Qpo*Cpo_icg; Flow_po_hv_icg is "flow portal shunts";
  Flow_li_hv_icg: Cli_plasma_icg => Chv_icg; (1 - f_shunts)*(Qpo + Qha)*Cli_plasma_icg; Flow_li_hv_icg is "outflow liver icg";
  Flow_hv_ve_icg: Chv_icg => Cve_icg; Qh*Chv_icg; Flow_hv_ve_icg is "outflow hepatic vein icg";
  Flow_ve_lu_icg: Cve_icg => Clu_plasma_icg; Qlu*Cve_icg; Flow_ve_lu_icg is "inflow lung icg";
  Flow_lu_ar_icg: Clu_plasma_icg => Car_icg; Qlu*Clu_plasma_icg; Flow_lu_ar_icg is "outflow lung icg";
  Flow_ar_arre_icg: Car_icg => Cre_plasma_icg; Qre*Car_icg; Flow_ar_arre_icg is "inflow rest icg";
  Flow_re_ve_icg: Cre_plasma_icg => Cve_icg; Qre*Cre_plasma_icg; Flow_re_ve_icg is "outflow rest icg";
  LI__ICGIM: Cli_plasma_icg => LI__icg; LI__ICGIM_Vmax*Vli_tissue*Cli_plasma_icg/(LI__ICGIM_Km*(1 + LI__bil_ext/LI__ICGIM_ki_bil) + Cli_plasma_icg); LI__ICGIM is "ICG import";  // modifiers: LI__bil_ext
  LI__ICGLI2CA: LI__icg => LI__icg_bi; LI__ICGLI2CA_Vmax*Vli_tissue*LI__icg/(LI__ICGLI2CA_Km + LI__icg); LI__ICGLI2CA is "ICG export (bile)";
  LI__ICGLI2BI: LI__icg_bi => Afeces_icg; LI__ICGLI2BI_Vmax*Vli_tissue*LI__icg_bi; LI__ICGLI2BI is "ICG bile transport";

  // Unit definitions:
  unit mmole = 1e-3 mole;
  unit min = 60 second;
  unit m = metre;
  unit m2 = metre^2;
  unit mM = 1e-3 mole / litre;
  unit mmole_per_min = 1e-3 mole / (60 second);
  unit mmole_per_min_l = 1e-3 mole / (60 second * litre);
  unit litre_per_min = litre / (60 second);
  unit kg = kilogram;
  unit per_min = 1 / (60 second);
  unit s = second;
  unit mg = 1e-3 gram;
  unit ml = 1e-3 litre;
  unit hr = 3600 second;
  unit per_hr = 1 / (3600 second);
  unit cm = 0.01 metre;
  unit mg_per_l = 1e-3 gram / litre;
  unit mg_per_g = 1e-3 gram / gram;
  unit mg_per_hr = 1e-3 gram / (3600 second);
  unit l_per_min = litre / (60 second);
  unit l_per_hr = litre / (3600 second);
  unit l_per_kg = litre / (1000 gram);
  unit l_per_ml = litre / (1e-3 litre);
  unit g_per_mole = gram / mole;
  unit m2_per_kg = metre^2 / (1000 gram);
  unit mg_per_min = 1e-3 gram / (60 second);
  unit mmole_per_hr = 1e-3 mole / (3600 second);
  unit mmole_per_l = 1e-3 mole / litre;
  unit mmole_per_min_kg = 1e-3 mole / (60 second * 1000 gram);
  unit mmole_per_hr_ml = 1e-3 mole / (3600 second * 1e-3 litre);
  unit ml_per_s = 1e-3 litre / second;
  unit ml_per_s_kg = 1e-3 litre / (second * 1000 gram);
  unit ml_per_l = 1e-3 litre / litre;
  unit mulitre_per_g = 1e-6 litre / gram;
  unit mul_per_min_mg = 1e-6 litre / (60 second * 1e-3 gram);
  unit min_per_hr = 60 second / (3600 second);
  unit s_per_min = 60 second / (3600 second);
  unit s_per_hr = second / (3600 second);
  unit LI__per_min = 1 / (60 second);
end
