// SBML level 3 version 1

model icg_liver(Vext, Vli, Vbi, Vfeces, icg_ext, icg_feces)
  // model units - substance: mmole, time: min, volume: litre, area: m2, length: m, extent: mmole

  // Compartments:
  compartment Vext = 4 litre; Vext is "blood";
  compartment Vli = 1.5 litre; Vli is "liver";
  compartment Vbi = 1 litre; Vbi is "bile";
  compartment Vfeces = 1 litre;

  // Species:
  species $bil_ext in Vext = 0.01; bil_ext is "bilirubin (extern)";
  species icg_ext in Vext = 0; icg_ext is "icg (extern)";
  species icg in Vli = 0; icg is "icg (liver)";
  species icg_bi in Vbi = 0; icg_bi is "icg (bile)";
  substanceOnly species icg_feces in Vfeces = 0; icg_feces is "icg (feces)";

  // Parameters:
  ICGIM_Vmax = 0.02249479 mmole_per_min_l;
  ICGIM_Km = 0.01392785 mM;
  ICGIM_ki_bil = 0.02 mM;
  ICGLI2CA_Vmax = 0.0009575157 mmole_per_min_l;
  ICGLI2CA_Km = 0.01184841 mM;
  ICGLI2BI_Vmax = 0.0001144655 per_min;

  // Reactions:
  ICGIM: icg_ext => icg; ICGIM_Vmax*Vli*icg_ext/(ICGIM_Km*(1 + bil_ext/ICGIM_ki_bil) + icg_ext); ICGIM is "ICG import";  // modifiers: bil_ext
  ICGLI2CA: icg => icg_bi; ICGLI2CA_Vmax*Vli*icg/(ICGLI2CA_Km + icg); ICGLI2CA is "ICG export (bile)";
  ICGLI2BI: icg_bi => icg_feces; ICGLI2BI_Vmax*Vli*icg_bi; ICGLI2BI is "ICG bile transport";

  // Unit definitions:
  unit mmole = 1e-3 mole;
  unit min = 60 second;
  unit m = metre;
  unit m2 = metre^2;
  unit mM = 1e-3 mole / litre;
  unit mmole_per_min = 1e-3 mole / (60 second);
  unit mmole_per_min_l = 1e-3 mole / (60 second * litre);
  unit litre_per_min = litre / (60 second);
  unit per_min = 1 / (60 second);
end
