// SBML level 3 version 1

function max(x, y)
  piecewise(x, x > y, y);
end
max is "min";

function min(x, y)
  piecewise(x, x < y, y);
end
min is "max";

function heav(x)
  piecewise(0, x < 0, 0.5, x == 0, 1, x > 0);
end
heav is "max";

model main()
  // XPP model
  // This model was converted from XPP ode format to SBML using sbmlutils-0.1.5a6.
  // # Soma is Hodgkin Huxley
  // p Ek=-77,Ena=50, El=-54.4
  // p gl=.3,gkdr=36,gna=120
  // p i=11
  // p C=1.
  // p amphi=.1,amhalf=-40,amwidth=10
  // p bmphi=4,bmhalf=-65,bmwidth=18
  // p ahphi=0.07,ahhalf=-65,ahwidth=20
  // p bhphi=1,bhhalf=-35,bhwidth=10
  // p anphi=.01,anhalf=-55,anwidth=10
  // p bnphi=.125,bnhalf=-65,bnwidth=80
  // # functions
  // am(v)=amphi*(v-amhalf)/(1-exp(-(v-amhalf)/amwidth))
  // bm(v)=bmphi*exp(-(v-bmhalf)/bmwidth)
  // ah(v)=ahphi*exp(-(v-ahhalf)/ahwidth)
  // bh(v)=bhphi/(1+exp(-(v-bhhalf)/bhwidth))
  // an(v)=anphi*(v-anhalf)/(1-exp(-(v-anhalf)/anwidth))
  // bn(v)=bnphi*exp(-(v-bnhalf)/bnwidth)
  // #currents
  // ina(v,m,h)=gna*m^3*h*(v-Ena)
  // ikdr(v,n)=gkdr*n^4*(v-Ek)
  // il(v)=gl*(v-El)
  // Isyn(v,y)=gsyn*y*(v-Esyn)
  // #diff. equ.
  // v1'=(i-(ina(v1,m1,ha)+ikdr(v1,n1)+il(v1)+p0*Isyn(v1,y2))+eps*(ua1-v1)/dx)/C
  // v2'=(i-(ina(v2,m2,hb)+ikdr(v2,n2)+il(v2)+p0*Isyn(v2,y1))+eps*(ub1-v2)/dx)/C
  // m1'=am(v1)*(1-m1)-bm(v1)*m1
  // m2'=am(v2)*(1-m2)-bm(v2)*m2
  // n1'=an(v1)*(1-n1)-bn(v1)*n1
  // n2'=an(v2)*(1-n2)-bn(v2)*n2
  // ha'=ah(v1)*(1-ha)-bh(v1)*ha
  // hb'=ah(v2)*(1-hb)-bh(v2)*hb
  // ## synapse
  // parameter taur=1,taud=3,thresh=-30
  // x1'=(-x1+.5*(1+tanh((v1-thresh)/3.0)))/taur
  // x2'=(-x2+.5*(1+tanh((v2-thresh)/3.0)))/taur
  // y1'=(-y1+x1)/taud
  // y2'=(-y2+x2)/taud
  // init x1=.001, y1=.001,x2=.001, y2=.001
  // p gsyn=.1, Esyn=0
  // p Vp=-50, Vsp=9, gnad=0.02, gld=.1, taupna=10
  // # !!!! the cable is passive if gnad=0 !!!!
  // pinfd(V)=1/(1+exp(-(V-Vp)/Vsp))
  // Ih(V,y)=gnad*y*(V-Ena)/gld
  // Ild(V)=V-El
  // ha[1..50]'=(pinfd(ua[j])-ha[j])/taupna
  // hb[1..50]'=(pinfd(ub[j])-hb[j])/taupna
  // # NOT TO CONFUSE WITH h GATE IN SOMA!!
  // # cable equation
  // ua1'=((lambda/dx)^2*(ua2-2*ua1+v1)-Ild(ua1)-Ih(ua1,ha1)-p1*Isyn(ua1,y2)/gld)/tau
  // ua[2..50]'= ((lambda/dx)^2*(ua[j+1]-2*ua[j]+ua[j-1])-Ild(ua[j])-Ih(ua[j],ha[j]) -p[j]*Isyn(ua[j],y2)/gld )/tau
  // ua51=(c1+b1*ua50/dx)/(a1+b1/dx)
  // ub1'=((lambda/dx)^2*(ub2-2*ub1+v2)-Ild(ub1)-Ih(ub1,hb1)-p1*Isyn(ub1,y1)/gld)/tau
  // ub[2..50]'= ((lambda/dx)^2*(ub[j+1]-2*ub[j]+ub[j-1])-Ild(ub[j])-Ih(ub[j],hb[j])-p[j]*Isyn(ub[j],y1)/gld )/tau
  // ub51=(c1+b1*ub50/dx)/(a1+b1/dx)
  // par lambda=1,tau=10,dx=.1,c1=0,a1=0,b1=1,c0=0,a0=0,b0=1,eps=.025
  // #pulse(t)=heav(t)*heav(sigma-t)
  // par sigma=.05
  // par t0=14.45
  // aux prc=t0-t
  // p p[0..50]=0
  // @ total=300,xlo=0,xhi=300,ylo=-100,yhi=60,dt=0.05,bounds=10000000
  // d
  // This file has been produced by sbmlutils.
  // Terms of use
  // Copyright © 2017 Matthias Koenig
  // Redistribution and use of any part of this model, with or without modification, are permitted provided that the following conditions are met:
  // Redistributions of this SBML file must retain the above copyright notice, this list of conditions and the following disclaimer.
  // Redistributions in a different form must reproduce the above copyright notice, this list of conditions and the following disclaimer in the documentation and/or other materials provided with the distribution.
  // This model is distributed in the hope that it will be useful, but WITHOUT ANY WARRANTY; without even the implied warranty of MERCHANTABILITY or FITNESS FOR A PARTICULAR PURPOSE.

  // Parameters:
  Ek = -77;
  Ena = 50;
  El = -54.4;
  gl = 0.3;
  gkdr = 36;
  gna = 120;
  i = 11;
  C = 1;
  amphi = 0.1;
  amhalf = -40;
  amwidth = 10;
  bmphi = 4;
  bmhalf = -65;
  bmwidth = 18;
  ahphi = 0.07;
  ahhalf = -65;
  ahwidth = 20;
  bhphi = 1;
  bhhalf = -35;
  bhwidth = 10;
  anphi = 0.01;
  anhalf = -55;
  anwidth = 10;
  bnphi = 0.125;
  bnhalf = -65;
  bnwidth = 80;
  taur = 1;
  taud = 3;
  thresh = -30;
  x1 = 0.001;
  y1 = 0.001;
  x2 = 0.001;
  y2 = 0.001;
  gsyn = 0.1;
  Esyn = 0;
  Vp = -50;
  Vsp = 9;
  gnad = 0.02;
  gld = 0.1;
  taupna = 10;
  lambda = 1;
  tau = 10;
  dx = 0.1;
  c1 = 0;
  a1 = 0;
  b1 = 1;
  c0 = 0;
  a0 = 0;
  b0 = 1;
  eps = 0.025;
  sigma = 0.05;
  t0 = 14.45;
  v1 has dimensionless;
  v2 has dimensionless;
  m1 has dimensionless;
  m2 has dimensionless;
  n1 has dimensionless;
  n2 has dimensionless;
  ha has dimensionless;
  hb has dimensionless;
  ua1 has dimensionless;
  ub1 has dimensionless;
  ua51 has dimensionless;
  ub51 has dimensionless;
  prc has dimensionless;

  // Assignment rules:
  // (no variable named) := amphi*(v - amhalf)/(1 - exp(-(v - amhalf)/amwidth));
  // (no variable named) := bmphi*exp(-(v - bmhalf)/bmwidth);
  // (no variable named) := ahphi*exp(-(v - ahhalf)/ahwidth);
  // (no variable named) := bhphi/(1 + exp(-(v - bhhalf)/bhwidth));
  // (no variable named) := anphi*(v - anhalf)/(1 - exp(-(v - anhalf)/anwidth));
  // (no variable named) := bnphi*exp(-(v - bnhalf)/bnwidth);
  // (no variable named) := gna*m^3*h*(v - Ena);
  // (no variable named) := gkdr*n^4*(v - Ek);
  // (no variable named) := gl*(v - El);
  // (no variable named) := gsyn*y*(v - Esyn);
  // (no variable named) := 1/(1 + exp(-(V - Vp)/Vsp));
  // (no variable named) := gnad*y*(V - Ena)/gld;
  // (no variable named) := V - El;
  ua51 := (c1 + b1*ua50/dx)/(a1 + b1/dx);
  ub51 := (c1 + b1*ub50/dx)/(a1 + b1/dx);
  prc := t0 - t;

  // Rate rules:
  v1' = (i - (ina(v1, m1, ha) + ikdr(v1, n1) + il(v1) + p0*Isyn(v1, y2)) + eps*(ua1 - v1)/dx)/C;
  v2' = (i - (ina(v2, m2, hb) + ikdr(v2, n2) + il(v2) + p0*Isyn(v2, y1)) + eps*(ub1 - v2)/dx)/C;
  m1' = am(v1)*(1 - m1) - bm(v1)*m1;
  m2' = am(v2)*(1 - m2) - bm(v2)*m2;
  n1' = an(v1)*(1 - n1) - bn(v1)*n1;
  n2' = an(v2)*(1 - n2) - bn(v2)*n2;
  ha' = ah(v1)*(1 - ha) - bh(v1)*ha;
  hb' = ah(v2)*(1 - hb) - bh(v2)*hb;
  x1' = (-x1 + 0.5*(1 + tanh((v1 - thresh)/3)))/taur;
  x2' = (-x2 + 0.5*(1 + tanh((v2 - thresh)/3)))/taur;
  y1' = (-y1 + x1)/taud;
  y2' = (-y2 + x2)/taud;
  ua1' = ((lambda/dx)^2*(ua2 - 2*ua1 + v1) - Ild(ua1) - Ih(ua1, ha1) - p1*Isyn(ua1, y2)/gld)/tau;
  ub1' = ((lambda/dx)^2*(ub2 - 2*ub1 + v2) - Ild(ub1) - Ih(ub1, hb1) - p1*Isyn(ub1, y1)/gld)/tau;
end
