// SBML level 3 version 1

function max(x, y)
  piecewise(x, x > y, y);
end
max is "min";

function min(x, y)
  piecewise(x, x < y, y);
end
min is "max";

function heav(x)
  piecewise(0, x < 0, 0.5, x == 0, 1, x > 0);
end
heav is "max";

model main()
  // XPP model
  // This model was converted from XPP ode format to SBML using sbmlutils-0.1.5a6.
  // # Soma is Hodgkin-Huxley
  // p Ek=-77,Ena=50, El=-54.4
  // p gl=.3,gkdr=36,gna=120
  // p i=11
  // p C=1.
  // p amphi=.1,amhalf=-40,amwidth=10
  // p bmphi=4,bmhalf=-65,bmwidth=18
  // p ahphi=0.07,ahhalf=-65,ahwidth=20
  // p bhphi=1,bhhalf=-35,bhwidth=10
  // p anphi=.01,anhalf=-55,anwidth=10
  // p bnphi=.125,bnhalf=-65,bnwidth=80
  // # functions
  // am(v)=amphi*(v-amhalf)/(1-exp(-(v-amhalf)/amwidth))
  // bm(v)=bmphi*exp(-(v-bmhalf)/bmwidth)
  // ah(v)=ahphi*exp(-(v-ahhalf)/ahwidth)
  // bh(v)=bhphi/(1+exp(-(v-bhhalf)/bhwidth))
  // an(v)=anphi*(v-anhalf)/(1-exp(-(v-anhalf)/anwidth))
  // bn(v)=bnphi*exp(-(v-bnhalf)/bnwidth)
  // #currents
  // ina(v,m,h)=gna*m^3*h*(v-Ena)
  // ikdr(v,n)=gkdr*n^4*(v-Ek)
  // il(v)=gl*(v-El)
  // #diff. equ.
  // v'=(i-(ina(v,m,h)+ikdr(v,n)+il(v))+p0*pulse(t-taup)+eps*(u1-v)/dx)/C
  // m'=am(v)*(1-m)-bm(v)*m
  // n'=an(v)*(1-n)-bn(v)*n
  // h'=ah(v)*(1-h)-bh(v)*h
  // ## synapse
  // parameter taur=1,taud=3,thresh=-30
  // x'=(-x+.5*(1+tanh((v-thresh)/3.0)))/taur
  // y'=(-y+x)/taud
  // init x=.001, y=.001
  // Ild(V)=V-El
  // # cable equation
  // u1'=((lambda/dx)^2*(u2-2*u1+v)-Ild(u1))/tau+p1*pulse(t-taup)
  // u[2..50]'= ((lambda/dx)^2*(u[j+1]-2*u[j]+u[j-1])-Ild(u[j]))/tau +p[j]*pulse(t-taup)
  // u51=(c1+b1*u50/dx)/(a1+b1/dx)
  // par lambda=1,tau=10,dx=.1,c1=0,a1=0,b1=1,c0=0,a0=0,b0=1,eps=.025
  // pulse(t)=heav(t)*heav(sigma-t)
  // par sigma=.05
  // par t0=14.45
  // aux prc=t0-t
  // taup'=0
  // p p[0..50]=0
  // @ total=300,xlo=0,xhi=300,ylo=-100,yhi=60,dt=0.05,bounds=10000000
  // d
  // This file has been produced by sbmlutils.
  // Terms of use
  // Copyright © 2017 Matthias Koenig
  // Redistribution and use of any part of this model, with or without modification, are permitted provided that the following conditions are met:
  // Redistributions of this SBML file must retain the above copyright notice, this list of conditions and the following disclaimer.
  // Redistributions in a different form must reproduce the above copyright notice, this list of conditions and the following disclaimer in the documentation and/or other materials provided with the distribution.
  // This model is distributed in the hope that it will be useful, but WITHOUT ANY WARRANTY; without even the implied warranty of MERCHANTABILITY or FITNESS FOR A PARTICULAR PURPOSE.

  // Parameters:
  Ek = -77;
  Ena = 50;
  El = -54.4;
  gl = 0.3;
  gkdr = 36;
  gna = 120;
  i = 11;
  C = 1;
  amphi = 0.1;
  amhalf = -40;
  amwidth = 10;
  bmphi = 4;
  bmhalf = -65;
  bmwidth = 18;
  ahphi = 0.07;
  ahhalf = -65;
  ahwidth = 20;
  bhphi = 1;
  bhhalf = -35;
  bhwidth = 10;
  anphi = 0.01;
  anhalf = -55;
  anwidth = 10;
  bnphi = 0.125;
  bnhalf = -65;
  bnwidth = 80;
  taur = 1;
  taud = 3;
  thresh = -30;
  x = 0.001;
  y = 0.001;
  lambda = 1;
  tau = 10;
  dx = 0.1;
  c1 = 0;
  a1 = 0;
  b1 = 1;
  c0 = 0;
  a0 = 0;
  b0 = 1;
  eps = 0.025;
  sigma = 0.05;
  t0 = 14.45;
  v has dimensionless;
  m has dimensionless;
  n has dimensionless;
  h has dimensionless;
  u1 has dimensionless;
  taup has dimensionless;
  u51 has dimensionless;
  prc has dimensionless;

  // Assignment rules:
  // (no variable named) := amphi*(v - amhalf)/(1 - exp(-(v - amhalf)/amwidth));
  // (no variable named) := bmphi*exp(-(v - bmhalf)/bmwidth);
  // (no variable named) := ahphi*exp(-(v - ahhalf)/ahwidth);
  // (no variable named) := bhphi/(1 + exp(-(v - bhhalf)/bhwidth));
  // (no variable named) := anphi*(v - anhalf)/(1 - exp(-(v - anhalf)/anwidth));
  // (no variable named) := bnphi*exp(-(v - bnhalf)/bnwidth);
  // (no variable named) := gna*m^3*h*(v - Ena);
  // (no variable named) := gkdr*n^4*(v - Ek);
  // (no variable named) := gl*(v - El);
  // (no variable named) := V - El;
  u51 := (c1 + b1*u50/dx)/(a1 + b1/dx);
  // (no variable named) := heav(t)*heav(sigma - t);
  prc := t0 - t;

  // Rate rules:
  v' = (i - (ina(v, m, h) + ikdr(v, n) + il(v)) + p0*pulse(t - taup) + eps*(u1 - v)/dx)/C;
  m' = am(v)*(1 - m) - bm(v)*m;
  n' = an(v)*(1 - n) - bn(v)*n;
  h' = ah(v)*(1 - h) - bh(v)*h;
  x' = (-x + 0.5*(1 + tanh((v - thresh)/3)))/taur;
  y' = (-y + x)/taud;
  u1' = ((lambda/dx)^2*(u2 - 2*u1 + v) - Ild(u1))/tau + p1*pulse(t - taup);
  taup' = 0;
end
